# Рассчёт фильтра Чебышева II-рода
# https://ru.dsplib.org/content/filter_cheby2_ap/filter_cheby2_ap.html
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f_d := 10  # Гц - частота дискретизации
samples := 100
n := 0 .. samples - 1
dt := 1/f_d = 0.1
tt[n] := n*dt
h(t, H) := 1/f_d*integral(H(f)*e^(1i*2*π*f*t), f = -f_d/2 .. f_d/2)
db(x) := 10^(x/20)
db_P(x) := 10^(x/10)
to_db(x) := 20*log(|x|)
to_dbP(x) := 10*log(|x|)
roundup(x) := Trunc(x, 1) + (Trunc(x, 1) ≠ x)
abs(z) := |z|
circle_x[n] := cos(2*π/(samples - 1)*n)
circle_y[n] := sin(2*π/(samples - 1)*n)
Ki(k) :=
    k_0 ← k/(1 + sqrt(1 - k*k))
    k_0*k_0
K(k) :=
    ki ← Ki(k)
    (1 + ki)*K(ki) if k - ki > 0
    π/2 otherwise
T(k) := K(sqrt(1 - k*k))
sn(u, k) :=
    ki ← Ki(k)
    sin(u*π/2) if k - ki ≤ 0
    otherwise
        w ← sn(u, ki)
        (1 + ki)/(1/w + ki*w)
cd(u, k) :=
    ki ← Ki(k)
    cos(u*π/2) if k - ki ≤ 0
    otherwise
        w ← cd(u, ki)
        (1 + ki)/(1/w + ki*w)
sn_inv(sn, k) :=
    ki ← Ki(k)
    sn_inv(2*sn/((1 + ki)*(1 + sqrt(1 - k*k*sn*sn))), ki) if k - ki > 0
    2*asin(sn)/π
cd_inv(cn, k) :=
    ki ← Ki(k)
    cd_inv(2*cn/((1 + ki)*(1 + sqrt(1 - k*k*cn*cn))), ki) if k - ki > 0
    2*acos(cn)/π
K(0.66667) = 1.80967
T(0.66667) = 1.90424
K(0.0028615) = 1.5708
T(0.0028615) = 7.24272
Z(p_0, f_d) := (2*f_d + p_0)/(2*f_d - p_0)
z2p(z_0, f_d) := 2*f_d*(1 - z_0^-1)/(1 + z_0^-1)
Integral(f, x1, x2, dx) :=
    x ← x1
    y ← f(x)
    while x ≤ x2
        x ← x + dx
        S ← S + y + (y ← f(x))
    S*0.5*dx
cd(0.6, 0.93) = 0.761809
sn(0.6, 0.93) = 0.917919
# 0.917918 | 0.761809423
C(N, ω) := cos(N*acos(ω))
sh(x) := sinh(x)
ch(x) := cosh(x)
arsh(x) := asinh(x)
arch(x) := acosh(x)
Ω(T_d, ω) := 2/T_d*tan(ω/2)  # Преобразование частот аналогового фильтра в частоты цифрового
ConjV(z) := [Re(z) + 1i*Im(z); Re(z) - 1i*Im(z)]
SinCos(x) := [sin(x); cos(x)]
h2(t, H) := 1/f_d*Integral(y(f) ← H(f)*e^(1i*2*π*f*t), -f_d/2, f_d/2, f_d/2001)
ShCh(x) := [sh(x); ch(x)]
f_analog(f_digital., f_d) := f_d/π*tan(π*f_digital./f_d)
f_digit(f_analog, f_d) := f_d/π*atan(π*f_analog/f_d)
Root2PolynomP(P) :=
    N ← rows(P) + 1
    a[N - 1] ← 0
    [a[0]; a[1]] ← [-P[0]; 1]
    for n ∈ 2 .. N - 1
        a[n] ← 1
        root ← P[n - 1]
        for i ∈ n - 1 .. 1
            a[i] ← a[i - 1] - a[i]*root
        a[0] ← -a[0]*root
    a
Root2PolynomZ(Z) :=
    N ← rows(Z) + 1
    [a[N - 1]; a[N - 2]] ← [-Z[0]; 1]
    for k ∈ 2 .. N - 1
        a[N - 1 - k] ← a[N - 1 - k + 1]
        for i ∈ k - 1 .. 1
            a[N - 1 - i] ← a[N - 1 - (i - 1)] - a[N - 1 - i]*Z[k - 1]
        a[N - 1] ← -a[N - 1]*Z[k - 1]
    a
η(s) :=
    N ← rows(s)
    [y[0]; y[N - 1]] ← [s[0]; 0]
    for n ∈ 1 .. N - 1
        y[n] ← y[n - 1] + s[n]
    y
f_pl := 2/(2*π) = 0.31831
f_sl := 4/(2*π) = 0.63662
f_sh := 12/(2*π) = 1.90986
f_ph := 15/(2*π) = 2.38732
ω_pl := 2*π*f_pl = 2
ω_sl := 2*π*f_sl = 4
ω_sh := 2*π*f_sh = 12
ω_ph := 2*π*f_ph = 15
ω_c := ω_sl*ω_sh = 48
Δω := ω_sh - ω_sl = 8
Ω(T_d, ω) := 2/T_d*tan(ω/2)  # Преобразование частот аналогового фильтра в частоты цифрового
F_pl := f_analog(f_pl, f_d) = 0.319375
F_sl := f_analog(f_sl, f_d) = 0.645246
F_sh := f_analog(f_sh, f_d) = 2.17768
F_ph := f_analog(f_ph, f_d) = 2.96536
F_pl/f_pl - 1 = 0.334672 %
F_sl/f_sl - 1 = 1.35502 %
F_sh/f_sh - 1 = 14.0228 %
F_ph/f_ph - 1 = 24.2129 %
Ω_pl := 2*π*F_pl = 2.00669
Ω_sl := 2*π*F_sl = 4.0542
Ω_sh := 2*π*F_sh = 13.6827
Ω_ph := 2*π*F_ph = 18.6319
Ω_c := Ω_sl*Ω_sh = 55.4726
ΔΩ := Ω_sh - Ω_sl = 9.62854
Ω_0 :=
    Ω_p ←
        Ω_ph if Ω_c/Ω_ph > Ω_pl
        Ω_pl otherwise
    |ΔΩ*Ω_p/(Ω_c - Ω_p^2)|
    = 0.615059
ω_0 :=
    ω_p ←
        ω_ph if ω_c/ω_ph > ω_pl
        ω_pl otherwise
    |Δω*ω_p/(ω_c - ω_p^2)|
    = 0.677966
f_0 := ω_0/(2*π) = 0.107902
F_0 := Ω_0/(2*π) = 0.0978897
Ω_1 := 1
ω_1 := 1
F_1 := Ω_1/(2*π) = 0.159155
f_1 := ω_1/(2*π) = 0.159155
R_p := 1
G_p := (-R_p) db = 0.891251  # Неравномерность в полосе пропускания (дБ)
R_s := 40
G_s := (-R_s) db = 0.01  # Уровень подавления в полосе заграждения (дБ)
Ω_p := Ω_0 = 0.615059  # Частота среза аналогового фильтра
Ω_s := Ω_1 = 1  # Частота заграждения аналогового фильтра
# Порядок фильтра
ε_p := sqrt(10^(R_p/10) - 1) = 0.508847
ε_s := sqrt(10^(R_s/10) - 1) = 99.995
1/ε_s = 0.0100005
G_p := 1/sqrt(1 + ε_p^2) = 0.891251
ε_s/ε_p = 196.513
Ω_s/Ω_p = 1.62586
k_ω := Ω_p/Ω_s = 0.615059
k_ε := ε_p/ε_s = 0.00508873
# Порядок фильтра
ε_s/ε_p = 196.513
N := arch(ε_s/ε_p)/arch(Ω_s/Ω_p) = 5.59664
Ω_s/Ω_p = 1.62586
N := ceil(N) = 6
# Число парных полюсов | Наличие/отсутсвтие центрального полюса
L := Trunc(N/2, 1) = 3
r := mod(N, 2) = 0
2*L + r = 6
G_s := 1/sqrt(1 + ε_s^2) = 0.01
G_p := 1/sqrt(1 + ε_p^2) = 0.891251
β := 1/N*arsh(ε_s) = 0.883049
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θ(n) := (2*n - 1)/(2*N)*π
θ(n) := π*(n - 0.5)/N
conj(z) := Re(z) - 1i*Im(z)
poles(r, L) :=
    shβ ← sh(β)
    chβ ← ch(β)
    P[0] ← -Ω_0/k_ω*1/shβ if r ≠ 0
    for n ∈ 1 .. L
        [sinθ; cosθ] ← SinCos(π*(n - 0.5)/N)
        [P[2*n + r - 2]; P[2*n + r - 1]] ← ConjV(-Ω_0/k_ω*(sinθ*shβ - 1i*cosθ*chβ)/(sinθ^2*shβ^2 + cosθ^2*chβ^2))
    P
zeros(L) :=
    for n ∈ 1 .. L
        [P[2*n - 2]; P[2*n - 1]] ← ConjV(Ω_0/k_ω*1i/cos(π*(n - 0.5)/N))
    P
p_p := poles(r, L) = [-0.133883 + 0.705787i; -0.133883 - 0.705787i; -0.471031 + 0.665352i; -0.471031 - 0.665352i; -0.90341 + 0.341931i; -0.90341 - 0.341931i]
p_0 := zeros(L) = [1.03528i; -1.03528i; 1.41421i; -1.41421i; 3.8637i; -3.8637i]
ChebIICorrected(ε_s, N) :=
    β ← arsh(ε_s)/N
    L ← Trunc(N/2, 1)
    r ← mod(N, 2)
    [shβ; chβ] ← ShCh(β)
    P[0] ← -Ω_0/k_ω*1/shβ if r ≠ 0
    for n ∈ 1 .. L
        [sinθ; cosθ] ← SinCos(π*(n - 0.5)/N)
        [P[2*n + r - 2]; P[2*n + r - 1]] ← ConjV(-Ω_0/k_ω*(sinθ*shβ - 1i*cosθ*chβ)/(sinθ^2*shβ^2 + cosθ^2*chβ^2))
        [Z[2*n - 2]; Z[2*n - 1]] ← ConjV(Ω_0/k_ω*1i/cos(π*(n - 0.5)/N))
    [Z; P]
[p_0; p_p] := ChebIICorrected(ε_s, N)
p_0 = [1.03528i; -1.03528i; 1.41421i; -1.41421i; 3.8637i; -3.8637i]
p_p = [-0.133883 + 0.705787i; -0.133883 - 0.705787i; -0.471031 + 0.665352i; -0.471031 - 0.665352i; -0.90341 + 0.341931i; -0.90341 - 0.341931i]
G_0 := product(-p_0[i], i = 0 .. rows(p_0) - 1)/product(-p_p[i], i = 0 .. rows(p_p) - 1)
H_0(p) := 1/G_0*product(p - p_0[i], i = 0 .. rows(p_0) - 1)/product(p - p_p[i], i = 0 .. rows(p_p) - 1)
vectorize(|p_p|) = [0.718373; 0.718373; 0.815208; 0.815208; 0.965954; 0.965954]
G_0 = 100
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ω_h := ch(1/N*1/ch(1/ε_p)) = 1.00105
pzf_w(P_p, P_0, ω_c, Δω) :=
    count_p ← rows(P_p)
    count_0 ← rows(P_0)
    for i ∈ 0 .. count_p - 1
        pdw ← 0.5*Δω/P_p[i]
        [p1[i*2]; p1[i*2 + 1]] ← [pdw + sqrt(pdw^2 - ω_c); pdw - sqrt(pdw^2 - ω_c)]
    for i ∈ 0 .. count_0 - 1
        pdw ← 0.5*Δω/P_0[i]
        [p01[i*2]; p01[i*2 + 1]] ← [pdw + sqrt(pdw^2 - ω_c); pdw - sqrt(pdw^2 - ω_c)]
    if count_p ≠ count_0
        for i ∈ 0 .. (count_p - count_0) - 1
            [p02[i*2]; p02[i*2 + 1]] ← [1i*sqrt(ω_c); -1i*sqrt(ω_c)]
        p01 ← stack(p01, p02)
    [p1; p01]
pzf(P_p, P_0, f_min, f_max) :=
    count_p ← rows(P_p)
    count_0 ← rows(P_0)
    ω_min ← 2*π*f_min
    ω_max ← 2*π*f_max
    Δω ← ω_max - ω_min
    ω_c ← ω_min*ω_max
    pzf_w(P_p, P_0, ω_c, Δω)
H0(p) := G_p^(1 - r)/G_0*product(p - p_0[n], n = 0 .. rows(p_0) - 1)/product(p - p_p[n], n = 0 .. rows(p_p) - 1)
[p_p1; p_01] := pzf(p_p, p_0, F_sl, F_sh)
G_02 := HP(1i*2*π*sqrt(F_sl*F_sh), p_01, p_p1)  # error: Эта переменная не определена.
H_2(p) := G_p^r*product(p - p_01[n], n = 0 .. rows(p_01) - 1)/product(p - p_p1[n], n = 0 .. rows(p_p1) - 1)
H_z(z) := H_2(2*f_d*(1 - z^-1)/(1 + z^-1))
z_0 := vectorize(Z(p_01, f_d))
z_p := vectorize(Z(p_p1, f_d))
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p_p1 = [-0.418084 + 3.313i; -2.07987 - 16.4814i; -0.418084 - 3.313i; -2.07987 + 16.4814i; -1.45868 + 3.59891i; -5.36586 - 13.2389i; -1.45868 - 3.59891i; -5.36586 + 13.2389i; -3.33779 + 4.44941i; -5.98471 - 7.97788i; -3.33779 - 4.44941i; -5.98471 + 7.97788i]
p_01 = [4.13027i; -13.4307i; 13.4307i; -4.13027i; 4.78489i; -11.5933i; 11.5933i; -4.78489i; 6.30547i; -8.79752i; 8.79752i; -6.30547i]
z_0 = [0.918193 + 0.396133i; 0.378397 - 0.925643i; 0.378397 + 0.925643i; 0.918193 - 0.396133i; 0.891722 + 0.452584i; 0.496994 - 0.867754i; 0.496994 + 0.867754i; 0.891722 - 0.452584i; 0.819178 + 0.573539i; 0.675756 - 0.737125i; 0.675756 + 0.737125i; 0.819178 - 0.573539i]
z_p = [0.908793 + 0.309717i; 0.163387 - 0.868405i; 0.908793 - 0.309717i; 0.163387 + 0.868405i; 0.81305 + 0.304073i; 0.239332 - 0.646828i; 0.81305 - 0.304073i; 0.239332 + 0.646828i; 0.653844 + 0.31531i; 0.406762 - 0.431907i; 0.653844 - 0.31531i; 0.406762 + 0.431907i]
G_0z := product(1 - z_0[n], n = 0 .. rows(z_0) - 1)/product(1 - z_p[n], n = 0 .. rows(z_p) - 1) = 4.57189
H_z2(z) := 1/G_0z*product(1 - z_0[n]*z^-1, n = 0 .. rows(z_0) - 1)/product(1 - z_p[n]*z^-1, n = 0 .. rows(z_p) - 1)
1/Re(G_0z) = 0.218728
M_p := [f_pl, 1; f_sl, 1; f_sl, G_s; f_sh, G_s; f_sh, 1; f_ph, 1]
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hh_z2 := vectorize(h(tt, H(f) ← H_z2(e^(1i*2*π*f/f_d))))
ηη_z2 := η(hh_z2)
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z_0 = [0.918193 + 0.396133i; 0.378397 - 0.925643i; 0.378397 + 0.925643i; 0.918193 - 0.396133i; 0.891722 + 0.452584i; 0.496994 - 0.867754i; 0.496994 + 0.867754i; 0.891722 - 0.452584i; 0.819178 + 0.573539i; 0.675756 - 0.737125i; 0.675756 + 0.737125i; 0.819178 - 0.573539i]
Root2PolynomZ(z_0) = [1; -8.36048; 34.6366; -93.1409; 180.246; -263.712; 298.673; -263.712; 180.246; -93.1409; 34.6366; -8.36048; 1]
z_p = [0.908793 + 0.309717i; 0.163387 - 0.868405i; 0.908793 - 0.309717i; 0.163387 + 0.868405i; 0.81305 + 0.304073i; 0.239332 - 0.646828i; 0.81305 - 0.304073i; 0.239332 + 0.646828i; 0.653844 + 0.31531i; 0.406762 - 0.431907i; 0.653844 - 0.31531i; 0.406762 + 0.431907i]
[b; a] := [1/G_0z*Root2PolynomZ(z_0); Root2PolynomZ(z_p)]
Filter(a, b, s, N) :=
    N_s ← rows(s)
    NN ← min(N_s, N)
    y[N - 1] ← 0
    state[max(rows(a), rows(b)) - 1] ← 0
    a0 ← 1/a[0]
    if rows(a) == rows(b)
        for n ∈ 0 .. N - 1
            sn ←
                s[n] if n < N_s
                0 otherwise
            for i ∈ rows(state) - 1 .. 1
                v ← state[i - 1]
                state[i] ← v
                result ← result + v*b[i]*a0
                sn ← sn - v*a[i]*a0
            state[0] ← sn
            y[n] ← result + sn*b[0]*a0
    otherwise
        for n ∈ 0 .. N - 1
            sn ←
                s[n] if n < N_s
                0
            for i ∈ rows(state) - 1 .. rows(b)
                v ← state[i - 1]
                state[i] ← v
                sn ← sn - v*a[i]*a0
            for i ∈ rows(b) - 1 .. 1
                v ← state[i - 1]
                state[i] ← v
                result ← result + v*b[i]*a0
                sn ← sn - v*a[i]*a0
            state[0] ← sn
            y[n] ← result + sn*b[0]*a0
    y
a_rev := reverse(a)
b_rev := reverse(b)
rows(ηη_z2) = 100
hh2 := Filter(1/G_0z*a, b, [1], samples)
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1/G_0z*product(1 - z_0[n]*z^-1, n = 0 .. rows(z_0) - 1) coeffs → [
    0.21872794262 - 2.08651273164e-17i;
    -1.82867068413 + 1.74442488633e-16i;
    7.57598139808 - 7.22696032908e-16i;
    -20.3725141716 + 1.94339642596e-15i;
    39.4247458112 - 3.76084706377e-15i;
    -57.6812281575 + 5.50238874309e-15i;
    65.3281888485 - 6.23185570781e-15i;
    -57.6812281575 + 5.50238874309e-15i;
    39.4247458112 - 3.76084706377e-15i;
    -20.3725141716 + 1.94339642596e-15i;
    7.57598139808 - 7.22696032908e-16i;
    -1.82867068413 + 1.74442488633e-16i;
    0.21872794262 - 2.08651273164e-17i
]
1/G_0z*a_rev = [0.0104664; -0.1083; 0.559445; -1.8875; 4.61271; -8.58569; 12.4727; -14.2558; 12.7465; -8.71437; 4.32503; -1.39337; 0.218728]
Re([
    0.21872794262 - 2.08651273164e-17i;
    -1.82867068413 + 1.74442488633e-16i;
    7.57598139808 - 7.22696032908e-16i;
    -20.3725141716 + 1.94339642596e-15i;
    39.4247458112 - 3.76084706377e-15i;
    -57.6812281575 + 5.50238874309e-15i;
    65.3281888485 - 6.23185570781e-15i;
    -57.6812281575 + 5.50238874309e-15i;
    39.4247458112 - 3.76084706377e-15i;
    -20.3725141716 + 1.94339642596e-15i;
    7.57598139808 - 7.22696032908e-16i;
    -1.82867068413 + 1.74442488633e-16i;
    0.21872794262 - 2.08651273164e-17i
]) = [0.218728; -1.82867; 7.57598; -20.3725; 39.4247; -57.6812; 65.3282; -57.6812; 39.4247; -20.3725; 7.57598; -1.82867; 0.218728]
1/G_0z = 0.218728
product(1 - z_p[n]*z^-1, n = 0 .. rows(z_0) - 1) coeffs → [
    0.0478511243347;
    -0.495134894758 - 6.31088724177e-30i;
    2.55771912269 + 3.78653234506e-29i;
    -8.62946288062;
    21.088820389 - 2.01948391737e-28i;
    -39.2528091297 + 4.03896783473e-28i;
    57.0237621328 - 4.03896783473e-28i;
    -65.1759661622 + 8.07793566946e-28i;
    58.2753756432 - 4.03896783473e-28i;
    -39.841114489 + 2.01948391737e-28i;
    19.7735707404 - 1.51461293802e-28i;
    -6.37033847001;
    1
]
b_rev = [0.218728; -1.82867; 7.57598; -20.3725; 39.4247; -57.6812; 65.3282; -57.6812; 39.4247; -20.3725; 7.57598; -1.82867; 0.218728]
Re([
    0.0478511243347;
    -0.495134894758 - 6.31088724177e-30i;
    2.55771912269 + 3.78653234506e-29i;
    -8.62946288062;
    21.088820389 - 2.01948391737e-28i;
    -39.2528091297 + 4.03896783473e-28i;
    57.0237621328 - 4.03896783473e-28i;
    -65.1759661622 + 8.07793566946e-28i;
    58.2753756432 - 4.03896783473e-28i;
    -39.841114489 + 2.01948391737e-28i;
    19.7735707404 - 1.51461293802e-28i;
    -6.37033847001;
    1
]) = [0.0478511; -0.495135; 2.55772; -8.62946; 21.0888; -39.2528; 57.0238; -65.176; 58.2754; -39.8411; 19.7736; -6.37034; 1]
Re(hh_z2) = [
    0.218728; -0.4353; 0.477943; -0.00606319; -0.153791; 0.123792; 0.220155; 0.0580539; -0.0131752; 0.103166
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]
