# Рассчёт фильтра Чебышева II-рода
# https://ru.dsplib.org/content/filter_cheby2_ap/filter_cheby2_ap.html
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f_d := 10  # Гц - частота дискретизации
samples := 100
n := 0 .. samples - 1
dt := 1/f_d = 0.1
tt[n] := n*dt
h(t, H) := 1/f_d*integral(H(f)*e^(1i*2*π*f*t), f = -f_d/2 .. f_d/2)
df := f_d/samples = 0.1
db(x) := 10^(x/20)
db_P(x) := 10^(x/10)
to_db(x) := 20*log(|x|)
to_dbP(x) := 10*log(|x|)
roundup(x) := Trunc(x, 1) + (Trunc(x, 1) ≠ x)
abs(z) := |z|
circle_x[n] := cos(2*π/(samples - 1)*n)
circle_y[n] := sin(2*π/(samples - 1)*n)
Ki(k) :=
    k_0 ← k/(1 + sqrt(1 - k*k))
    k_0*k_0
K(k) :=
    ki ← Ki(k)
    (1 + ki)*K(ki) if k - ki > 0
    π/2 otherwise
T(k) := K(sqrt(1 - k*k))
sn(u, k) :=
    ki ← Ki(k)
    sin(u*π/2) if k - ki ≤ 0
    otherwise
        w ← sn(u, ki)
        (1 + ki)/(1/w + ki*w)
cd(u, k) :=
    ki ← Ki(k)
    cos(u*π/2) if k - ki ≤ 0
    otherwise
        w ← cd(u, ki)
        (1 + ki)/(1/w + ki*w)
sn_inv(sn, k) :=
    ki ← Ki(k)
    sn_inv(2*sn/((1 + ki)*(1 + sqrt(1 - k*k*sn*sn))), ki) if k - ki > 0
    2*asin(sn)/π
cd_inv(cn, k) :=
    ki ← Ki(k)
    cd_inv(2*cn/((1 + ki)*(1 + sqrt(1 - k*k*cn*cn))), ki) if k - ki > 0
    2*acos(cn)/π
K(0.66667) = 1.80967
T(0.66667) = 1.90424
K(0.0028615) = 1.5708
T(0.0028615) = 7.24272
Z(p_0, f_d) := (2*f_d + p_0)/(2*f_d - p_0)
z2p(z_0, f_d) := 2*f_d*(1 - z_0^-1)/(1 + z_0^-1)
cd(0.6, 0.93) = 0.761809
sn(0.6, 0.93) = 0.917919
# 0.917918 | 0.761809423
C(N, ω) := cos(N*acos(ω))
sh(x) := sinh(x)
ch(x) := cosh(x)
arsh(x) := asinh(x)
arch(x) := acosh(x)
f_analog(f_digital., f_d) := f_d/π*tan(π*f_digital./f_d)
conj(z) := Re(z) - 1i*Im(z)
PolynomP(p, P) := product(p - P[n], n = 0 .. rows(P) - 1)
PolynomZ(z, Z) := product(1 - Z[n]*z^-1, n = 0 .. rows(Z) - 1)
f_digit(f_analog, f_d) := f_d/π*atan(π*f_analog/f_d)
HP(p, P_0, P_p) := PolynomP(p, P_0)/PolynomP(p, P_p)
HZ(z, Z_0, Z_p) := PolynomZ(z, Z_0)/PolynomZ(z, Z_p)
f_sl := 2/(2*π) = 0.31831
f_pl := 4/(2*π) = 0.63662
f_ph := 12/(2*π) = 1.90986
f_sh := 15/(2*π) = 2.38732
f_p0 := sqrt(f_pl*f_ph)
f_s0 := sqrt(f_sl*f_sh)
ω_sl := 2*π*f_sl = 2
ω_pl := 2*π*f_pl = 4
ω_ph := 2*π*f_ph = 12
ω_sh := 2*π*f_sh = 15
Root2PolynomP(P) :=
    N ← rows(P) + 1
    a[N - 1] ← 0
    [a[0]; a[1]] ← [-P[0]; 1]
    for n ∈ 2 .. N - 1
        a[n] ← 1
        root ← P[n - 1]
        for i ∈ n - 1 .. 1
            a[i] ← a[i - 1] - a[i]*root
        a[0] ← -a[0]*root
    a
Root2PolynomZ(Z) :=
    N ← rows(Z) + 1
    [a[N - 1]; a[N - 2]] ← [-Z[0]; 1]
    for k ∈ 2 .. N - 1
        a[N - 1 - k] ← a[N - 1 - k + 1]
        for i ∈ k - 1 .. 1
            a[N - 1 - i] ← a[N - 1 - (i - 1)] - a[N - 1 - i]*Z[k - 1]
        a[N - 1] ← -a[N - 1]*Z[k - 1]
    a
ω_c := ω_pl*ω_ph = 48
Δω := ω_ph - ω_pl = 8
Ω(T_d, ω) := 2/T_d*tan(ω/2)  # Преобразование частот аналогового фильтра в частоты цифрового
F_sl := f_analog(f_sl, f_d) = 0.319375
F_pl := f_analog(f_pl, f_d) = 0.645246
F_ph := f_analog(f_ph, f_d) = 2.17768
F_sh := f_analog(f_sh, f_d) = 2.96536
F_pl/f_pl - 1 = 1.35502 %
F_sl/f_sl - 1 = 0.334672 %
F_sh/f_sh - 1 = 24.2129 %
F_ph/f_ph - 1 = 14.0228 %
F_p0 := sqrt(F_pl*F_ph)
F_s0 := sqrt(F_sl*F_sh)
Ω_sl := 2*π*F_sl = 2.00669
Ω_pl := 2*π*F_pl = 4.0542
Ω_ph := 2*π*F_ph = 13.6827
Ω_sh := 2*π*F_sh = 18.6319
ff_p0 := f_digit(F_p0, f_d)  # центральная частота цифрового фильтра
Ω_c := Ω_pl*Ω_ph = 55.4726
ΔΩ := Ω_ph - Ω_pl = 9.62854
F_p0 = 1.18538
Ω_p := 1
F_p := Ω_p/(2*π) = 0.159155  # Частота среза аналогового фильтра
ff_p0 = 1.13474
Ω_s :=
    Ω_s ←
        Ω_sh if Ω_c/Ω_sh > Ω_sl
        Ω_sl otherwise
    |(Ω_c - Ω_s^2)/(ΔΩ*Ω_s)|
    = 1.62586
F_s := Ω_s/(2*π) = 0.258764  # Частота заграждения аналогового фильтра
R_p := 1  # Неравномерность в полосе пропускания (дБ)
G_p := (-R_p) db = 0.891251
R_s := 50  # Уровень подавления в полосе заграждения (дБ)
G_s := (-R_s) db = 0.00316228
# Порядок фильтра
ε_p := sqrt(10^(R_p/10) - 1) = 0.508847
ε_s := sqrt(10^(R_s/10) - 1) = 316.226
1/ε_s = 0.00316229
G_p := 1/sqrt(1 + ε_p^2) = 0.891251
ε_s/ε_p = 621.456
Ω_s/Ω_p = 1.62586
k_ω := Ω_p/Ω_s = 0.615059
k_ε := ε_p/ε_s = 0.00160912
# Порядок фильтра
N := arch(ε_s/ε_p)/arch(Ω_s/Ω_p) = 6.67528
N := ceil(N) = 7
# Число парных полюсов | Наличие/отсутсвтие центрального полюса
L := Trunc(N/2, 1) = 3
r := mod(N, 2) = 1
2*L + r = 7
G_s := 1/sqrt(1 + ε_s^2) = 0.00316228
G_p := 1/sqrt(1 + ε_p^2) = 0.891251
β := 1/N*arsh(ε_s) = 0.921372
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θ(n) := (2*n - 1)/(2*N)*π  # disabled
θ(n) := π*(n - 0.5)/N
conj(z) := Re(z) - 1i*Im(z)
poles(r, L) :=
    i ← 0
    if r ≠ 0
        P[i] ← -1/sh(β)
        i ← 1
    for n ∈ 1 .. L
        θ ← π*(n - 0.5)/N
        P[i] ← 1i/cos(θ + 1i*β)
        P[i + 1] ← conj(P[i])
        i ← i + 2
    P
zeros(L) :=
    for n ∈ 1 .. L
        θ ← π*(n - 0.5)/N
        [P[2*n - 2]; P[2*n - 1]] ← [1i/cos(θ); -1i/cos(θ)]
    P
# Произведение нулей в нуле
(1/product(cos(π*(n - 0.5)/N), n = 1 .. L))^2 = 9.14286
1/product(|cos(π*(n - 0.5)/N + 1i*β)|^2, n = 1 .. L) = 0.214
p_p := poles(r, L) = [-0.945732; -0.113747 + 0.685926i; -0.113747 - 0.685926i; -0.38123 + 0.657972i; -0.38123 - 0.657972i; -0.729281 + 0.483387i; -0.729281 - 0.483387i]
p_0 := zeros(L) = [1.02572i; -1.02572i; 1.27905i; -1.27905i; 2.30476i; -2.30476i]
G_0 := product(-p_0[i], i = 0 .. rows(p_0) - 1)/product(-p_p[i], i = 0 .. rows(p_p) - 1)
H_0(p) := 1/G_0*product(p - p_0[i], i = 0 .. rows(p_0) - 1)/product(p - p_p[i], i = 0 .. rows(p_p) - 1)
product(0 - p_p[i], i = 0 .. rows(p_p) - 1) = 0.202387
vectorize(|p_p|) = [0.945732; 0.695293; 0.695293; 0.760436; 0.760436; 0.874936; 0.874936]
G_0 = 45.1752
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ω_h := ch(1/N*1/ch(1/ε_p)) = 1.00077
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(0 - p_0[0])*(0 - p_0[1]) = 1.0521
ppf_poles(P, f_min, f_max) :=
    N ← rows(P)
    ω_min ← 2*π*f_min
    ω_max ← 2*π*f_max
    Δω ← (ω_max - ω_min)/2
    ω2_c ← ω_min*ω_max
    for i ∈ 0 .. N - 1
        pdw ← P[i]*Δω
        [p[i*2]; p[i*2 + 1]] ← [pdw + sqrt(pdw^2 - ω2_c); pdw - sqrt(pdw^2 - ω2_c)]
    p
ppf(P_0, P_p, f_min, f_max) := [
    {
        stack(ppf_poles(P_0, f_min, f_max), 0) if r == 1
        ppf_poles(P_0, f_min, f_max) otherwise
    };
    ppf_poles(P_p, f_min, f_max)
]
[p_03; p_p3] := ppf(p_0, p_p, F_pl, F_ph)
z_p := Z(p_p3, f_d)
z_0 :=
    stack(Z(p_03, f_d), -1) if r == 1
    Z(p_03, f_d) otherwise
p_p3 = [-4.55301 + 5.89429i; -4.55301 - 5.89429i; -0.325231 - 4.82961i; -0.769982 + 11.4341i; -0.325231 + 4.82961i; -0.769982 - 11.4341i; -1.101 - 4.74925i; -2.56968 + 11.0846i; -1.101 + 4.74925i; -2.56968 - 11.0846i; -2.3543 - 4.73679i; -4.66761 + 9.3911i; -2.3543 + 4.73679i; -4.66761 - 9.3911i]
z_p = [0.540357 + 0.369784i; 0.540357 - 0.369784i; 0.862819 - 0.442637i; 0.477948 + 0.813625i; 0.862819 + 0.442637i; 0.477948 - 0.813625i; 0.804246 - 0.406086i; 0.427878 + 0.701268i; 0.804246 + 0.406086i; 0.427878 - 0.701268i; 0.712475 - 0.362867i; 0.416288 + 0.539189i; 0.712475 + 0.362867i; 0.416288 - 0.539189i]
z_fp0 := [Z(0 + 1i*2*π*f_p0, f_d); Z(0 - 1i*2*π*f_p0, f_d)]
p_p = [-0.945732; -0.113747 + 0.685926i; -0.113747 - 0.685926i; -0.38123 + 0.657972i; -0.38123 - 0.657972i; -0.729281 + 0.483387i; -0.729281 - 0.483387i]
ZZ(z) := 2*f_d*(1 - z^-1)/(1 + z^-1)
PP(p) := (p^2 + ω_c)/(p*Δω)
K_z0 :=
    z0 ← exp(1i*2*π*ff_p0*dt)
    |product(z0 - z_0[n], n = 0 .. rows(z_0) - 1)/product(z0 - z_p[n], n = 0 .. rows(z_p) - 1)|
    = 147.726
K_p0 :=
    p0 ← 1i*2*π*F_p0
    product(p0 - p_03[n], n = 0 .. rows(p_03) - 1)/product(p0 - p_p3[n], n = 0 .. rows(p_p3) - 1)
    = 4.6918
M_p := [f_sl, G_s; f_pl, G_s; f_pl, G_p; f_ph, G_p; f_ph, G_s; f_sh, G_s]
H_ppf(p) := G_p^(1 - r)/K_p0*PolynomP(p, p_03)/PolynomP(p, p_p3)
HZ(z) := G_p^(1 - r)/K_z0*product(1 - z_0[n]*z^-1, n = 0 .. rows(z_0) - 1)/product(1 - z_p[n]*z^-1, n = 0 .. rows(z_p) - 1)
|HZ(e^(1i*2*π*ff_p0/f_d))| = 1
|HZ(e^(1i*2*π*f_p0/f_d))| = 1
|H_ppf(1i*2*π*ff_p0)| = 1
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