# Рассчёт фильтра Чебышева II-рода
# https://ru.dsplib.org/content/filter_cheby2_ap/filter_cheby2_ap.html
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f_d := 10  # Гц - частота дискретизации
samples := 100
n := 0 .. samples - 1
dt := 1/f_d = 0.1
tt[n] := n*dt
h(t, H) := 1/f_d*integral(H(f)*e^(1i*2*π*f*t), f = -f_d/2 .. f_d/2)
df := f_d/samples = 0.1
db(x) := 10^(x/20)
db_P(x) := 10^(x/10)
to_db(x) := 20*log(|x|)
to_dbP(x) := 10*log(|x|)
roundup(x) := Trunc(x, 1) + (Trunc(x, 1) ≠ x)
abs(z) := |z|
circle_x[n] := cos(2*π/(samples - 1)*n)
circle_y[n] := sin(2*π/(samples - 1)*n)
Ki(k) :=
    k_0 ← k/(1 + sqrt(1 - k*k))
    k_0*k_0
K(k) :=
    ki ← Ki(k)
    (1 + ki)*K(ki) if k - ki > 0
    π/2 otherwise
T(k) := K(sqrt(1 - k*k))
sn(u, k) :=
    ki ← Ki(k)
    sin(u*π/2) if k - ki ≤ 0
    otherwise
        w ← sn(u, ki)
        (1 + ki)/(1/w + ki*w)
cd(u, k) :=
    ki ← Ki(k)
    cos(u*π/2) if k - ki ≤ 0
    otherwise
        w ← cd(u, ki)
        (1 + ki)/(1/w + ki*w)
sn_inv(sn, k) :=
    ki ← Ki(k)
    sn_inv(2*sn/((1 + ki)*(1 + sqrt(1 - k*k*sn*sn))), ki) if k - ki > 0
    2*asin(sn)/π
cd_inv(cn, k) :=
    ki ← Ki(k)
    cd_inv(2*cn/((1 + ki)*(1 + sqrt(1 - k*k*cn*cn))), ki) if k - ki > 0
    2*acos(cn)/π
K(0.66667) = 1.80967
T(0.66667) = 1.90424
K(0.0028615) = 1.5708
T(0.0028615) = 7.24272
Z(p_0, f_d) := (2*f_d + p_0)/(2*f_d - p_0)
z2p(z_0, f_d) := 2*f_d*(1 - z_0^-1)/(1 + z_0^-1)
η(s) :=
    N ← rows(s)
    [y[0]; y[N - 1]] ← [s[0]; 0]
    for n ∈ 1 .. N - 1
        y[n] ← y[n - 1] + s[n]
    y
cd(0.6, 0.93) = 0.761809
sn(0.6, 0.93) = 0.917919
0.917918
0.761809423
SinCos(x) := [sin(x); cos(x)]
C(N, ω) := cos(N*acos(ω))
sh(x) := sinh(x)
ch(x) := cosh(x)
arsh(x) := asinh(x)
arch(x) := acosh(x)
f_analog(f_digital., f_d) := f_d/π*tan(π*f_digital./f_d)
conj(z) := Re(z) - 1i*Im(z)
ShCh(x) := [sh(x); ch(x)]
PolynomP(p, P) := product(p - P[n], n = 0 .. rows(P) - 1)
PolynomZ(z, Z) := product(1 - Z[n]*z^-1, n = 0 .. rows(Z) - 1)
f_digit(f_analog, f_d) := f_d/π*atan(π*f_analog/f_d)
ConjV(z) := [Re(z) + 1i*Im(z); Re(z) - 1i*Im(z)]
HP(p, P_0, P_p) := PolynomP(p, P_0)/PolynomP(p, P_p)
HZ(z, Z_0, Z_p) := PolynomZ(z, Z_0)/PolynomZ(z, Z_p)
f_sl := 2/(2*π) = 0.31831
f_pl := 4/(2*π) = 0.63662
f_ph := 12/(2*π) = 1.90986
f_sh := 15/(2*π) = 2.38732
f_p0 := sqrt(f_pl*f_ph)
f_s0 := sqrt(f_sl*f_sh)
ω_sl := 2*π*f_sl = 2
ω_pl := 2*π*f_pl = 4
ω_ph := 2*π*f_ph = 12
ω_sh := 2*π*f_sh = 15
Root2PolynomP(P) :=
    N ← rows(P) + 1
    a[N - 1] ← 0
    [a[0]; a[1]] ← [-P[0]; 1]
    for n ∈ 2 .. N - 1
        a[n] ← 1
        root ← P[n - 1]
        for i ∈ n - 1 .. 1
            a[i] ← a[i - 1] - a[i]*root
        a[0] ← -a[0]*root
    a
Root2PolynomZ(Z) :=
    N ← rows(Z) + 1
    [a[N - 1]; a[N - 2]] ← [-Z[0]; 1]
    for k ∈ 2 .. N - 1
        a[N - 1 - k] ← a[N - 1 - k + 1]
        for i ∈ k - 1 .. 1
            a[N - 1 - i] ← a[N - 1 - (i - 1)] - a[N - 1 - i]*Z[k - 1]
        a[N - 1] ← -a[N - 1]*Z[k - 1]
    a
ω_c := ω_pl*ω_ph = 48
Δω := ω_ph - ω_pl = 8
Ω(T_d, ω) := 2/T_d*tan(ω/2)  # Преобразование частот аналогового фильтра в частоты цифрового
F_sl := f_analog(f_sl, f_d) = 0.319375
F_pl := f_analog(f_pl, f_d) = 0.645246
F_ph := f_analog(f_ph, f_d) = 2.17768
F_sh := f_analog(f_sh, f_d) = 2.96536
F_p0 := sqrt(F_pl*F_ph)
F_s0 := sqrt(F_sl*F_sh)
Ω_sl := 2*π*F_sl = 2.00669
Ω_pl := 2*π*F_pl = 4.0542
Ω_ph := 2*π*F_ph = 13.6827
Ω_sh := 2*π*F_sh = 18.6319
ff_p0 := f_digit(F_p0, f_d)  # центральная частота цифрового фильтра
Ω_c := Ω_pl*Ω_ph = 55.4726
ΔΩ := Ω_ph - Ω_pl = 9.62854
F_p0 = 1.18538
ff_p0 = 1.13474
Ω_p := 1
F_p := Ω_p/(2*π) = 0.159155  # Частота среза аналогового фильтра
Ω_s :=
    Ω_s ←
        Ω_sh if Ω_c/Ω_sh > Ω_sl
        Ω_sl otherwise
    |(Ω_c - Ω_s^2)/(ΔΩ*Ω_s)|
    = 1.62586
F_s := Ω_s/(2*π) = 0.258764  # Частота заграждения аналогового фильтра
sqrt(F_sl*F_sh) = 0.973172
sqrt(F_pl*F_ph) = 1.18538
"Fsh" if F_pl*F_ph > F_sl*F_sh
"Fsl" otherwise
= "Fsh"
R_p := 1  # Неравномерность в полосе пропускания (дБ)
G_p := (-R_p) db = 0.891251
R_s := 40  # Уровень подавления в полосе заграждения (дБ)
G_s := (-R_s) db = 0.01
# Порядок фильтра
ε_p := sqrt(10^(R_p/10) - 1) = 0.508847
ε_s := sqrt(10^(R_s/10) - 1) = 99.995
1/ε_s = 0.0100005
G_p := 1/sqrt(1 + ε_p^2) = 0.891251
ε_s/ε_p = 196.513
Ω_s/Ω_p = 1.62586
poles(r, L) :=
    shβ ← sh(β)
    chβ ← ch(β)
    P[0] ← -Ω_p/k_ω*1/shβ if r ≠ 0
    for n ∈ 1 .. L
        [sinθ; cosθ] ← SinCos(π*(n - 0.5)/N)
        [P[2*n + r - 2]; P[2*n + r - 1]] ← ConjV(-Ω_p/k_ω*(-1i*cos(π*(n - 0.5)/N - 1i*β)/(sinθ^2*shβ^2 + cosθ^2*chβ^2)))
    P  # error: Эта переменная не определена.
k_ω := Ω_p/Ω_s = 0.615059
k_ε := ε_p/ε_s = 0.00508873
# Порядок фильтра
N := arch(ε_s/ε_p)/arch(Ω_s/Ω_p) = 5.59664
N := ceil(N) = 6
# Число парных полюсов
# Наличие/отсутсвтие центрального полюса
θ1 := π*(1 - 0.5)/N
L := Trunc(N/2, 1) = 3
r := mod(N, 2) = 0
2*L + r = 6
sin(θ1)*sh(β) - 1i*cos(θ1)*ch(β) =  # error: Эта переменная не определена.
G_s := 1/sqrt(1 + ε_s^2) = 0.01
G_p := 1/sqrt(1 + ε_p^2) = 0.891251
-1i*cos(θ1 - 1i*β) =  # error
β := 1/N*arsh(ε_s) = 0.883049
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θ(n) := (2*n - 1)/(2*N)*π
θ(n) := π*(n - 0.5)/N
conj(z) := Re(z) - 1i*Im(z)
poles(r, L) :=
    shβ ← sh(β)
    chβ ← ch(β)
    P[0] ← -Ω_p/k_ω*1/shβ if r ≠ 0
    for n ∈ 1 .. L
        [sinθ; cosθ] ← SinCos(π*(n - 0.5)/N)
        [P[2*n + r - 2]; P[2*n + r - 1]] ← ConjV(-Ω_p/k_ω*(sinθ*shβ - 1i*cosθ*chβ)/(sinθ^2*shβ^2 + cosθ^2*chβ^2))
    P
zeros(L) :=
    for n ∈ 1 .. L
        [P[2*n - 2]; P[2*n - 1]] ← ConjV(Ω_p/k_ω*1i/cos(π*(n - 0.5)/N))
    P
p_p := poles(r, L) = [-0.217675 + 1.14751i; -0.217675 - 1.14751i; -0.765831 + 1.08177i; -0.765831 - 1.08177i; -1.46882 + 0.555932i; -1.46882 - 0.555932i]
p_0 := zeros(L) = [1.68321i; -1.68321i; 2.29931i; -2.29931i; 6.28184i; -6.28184i]
ChebIICorrected(ε_s, N) :=
    β ← arsh(ε_s)/N
    L ← Trunc(N/2, 1)
    r ← mod(N, 2)
    [shβ; chβ] ← ShCh(β)
    P[0] ← -Ω_p/k_ω*1/shβ if r ≠ 0
    for n ∈ 1 .. L
        [sinθ; cosθ] ← SinCos(π*(n - 0.5)/N)
        [P[2*n + r - 2]; P[2*n + r - 1]] ← ConjV(-Ω_p/k_ω*(sinθ*shβ - 1i*cosθ*chβ)/(sinθ^2*shβ^2 + cosθ^2*chβ^2))
        [Z[2*n - 2]; Z[2*n - 1]] ← ConjV(Ω_p/k_ω*1i/cos(π*(n - 0.5)/N))
    [Z; P]
[p_0; p_p] := ChebIICorrected(ε_s, N)
p_0 = [1.68321i; -1.68321i; 2.29931i; -2.29931i; 6.28184i; -6.28184i]
p_p = [-0.217675 + 1.14751i; -0.217675 - 1.14751i; -0.765831 + 1.08177i; -0.765831 - 1.08177i; -1.46882 + 0.555932i; -1.46882 - 0.555932i]
G_0 := product(-p_0[i], i = 0 .. rows(p_0) - 1)/product(-p_p[i], i = 0 .. rows(p_p) - 1)
H_0(p) := 1/G_0*product(p - p_0[i], i = 0 .. rows(p_0) - 1)/product(p - p_p[i], i = 0 .. rows(p_p) - 1)
vectorize(|p_p|) = [1.16797; 1.16797; 1.32541; 1.32541; 1.57051; 1.57051]
G_0 = 100
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H_0(1i*Ω_p) to_db = -0.451069
ppf_w(P_p, P_0, ω_c, Δω) :=
    count_p ← rows(P_p)
    count_0 ← rows(P_0)
    p01[count_0*2 + (count_p - count_0) - 1] ← 0
    for i ∈ 0 .. count_p - 1
        pdw ← 0.5*P_p[i]*Δω
        [p1[i*2]; p1[i*2 + 1]] ← [pdw + sqrt(pdw^2 - ω_c); pdw - sqrt(pdw^2 - ω_c)]
    for i ∈ 0 .. count_0 - 1
        pdw ← 0.5*P_0[i]*Δω
        [p01[i*2]; p01[i*2 + 1]] ← [pdw + sqrt(pdw^2 - ω_c); pdw - sqrt(pdw^2 - ω_c)]
    [p1; p01]
ppf_poles(P, f_min, f_max) :=
    N ← rows(P)
    ω_min ← 2*π*f_min
    ω_max ← 2*π*f_max
    Δω ← (ω_max - ω_min)/2
    ω2_c ← ω_min*ω_max
    for i ∈ 0 .. N - 1
        pdw ← P[i]*Δω
        [p1[i*2]; p1[i*2 + 1]] ← [pdw + sqrt(pdw^2 - ω2_c); pdw - sqrt(pdw^2 - ω2_c)]
    p1
ppf_poles(P, f_min, f_max) :=
    N ← rows(P)
    ω_min ← 2*π*f_min
    ω_max ← 2*π*f_max
    Δω ← (ω_max - ω_min)/2
    ω2_c ← ω_min*ω_max
    for i ∈ 0 .. N - 1
        pdw ← P[i]*Δω
        [p1[i*2]; p1[i*2 + 1]] ← [pdw + sqrt(pdw^2 - ω2_c); pdw - sqrt(pdw^2 - ω2_c)]
    p1
PP(p) := (p^2 + ω_c)/(p*Δω)
ZZ(z) := 2*f_d*(1 - z^-1)/(1 + z^-1)
M_p := [f_sl, G_s; f_pl, G_s; f_pl, G_p; f_ph, G_p; f_ph, G_s; f_sh, G_s]
ppf_poles(P, f_min, f_max) :=
    count ← rows(P)
    ω_min ← 2*π*f_min
    ω_max ← 2*π*f_max
    Δω ← ω_max - ω_min
    ω2_c ← ω_min*ω_max
    for i ∈ 0 .. count - 1
        pdw ← P[i]*Δω/2
        [p1[i*2]; p1[i*2 + 1]] ← [pdw + sqrt(pdw^2 - ω2_c); pdw - sqrt(pdw^2 - ω2_c)]
    p1
z_fp0 := [Z(0 + 1i*2*π*f_p0, f_d); Z(0 - 1i*2*π*f_p0, f_d)]
ppf(P_p, P_0, f_min, f_max) :=
    count_p ← rows(P_p)
    count_0 ← rows(P_0)
    ω_min ← 2*π*f_min
    ω_max ← 2*π*f_max
    Δω ← ω_max - ω_min
    ω_c ← ω_min*ω_max
    ppf_w(P_p, P_0, ω_c, Δω)
[p_p1; p_01] := ppf(p_p, p_0, F_pl, F_ph)
G_02 := HP(1i*2*π*sqrt(F_pl*F_ph), p_01, p_p1)
z_0 := Z(p_01, f_d)
z_p := Z(p_p1, f_d)
K_z0 :=
    z0 ← exp(1i*2*π*ff_p0*dt)
    |1/z0^r*(z0 + 1)^r*product(z0 - z_0[n], n = 0 .. rows(z_0) - 1)/product(z0 - z_p[n], n = 0 .. rows(z_p) - 1)|
    = 31.844
K_z0 :=
    z0 ← exp(1i*2*π*ff_p0*dt)
    |1/z0^r*(z0 + 1)^r*product(z0 - z_0[n], n = 0 .. rows(z_0) - 1)/product(z0 - z_p[n], n = 0 .. rows(z_p) - 1)|
    = 31.844
H_ppf(p) := G_p^(1 - r)/G_02*HP(p, p_01, p_p1)
r = 0
HZ(z) := G_p^(1 - r)/K_z0*(1 + z^-1)^r*product(1 - z_0[n]*z^-1, n = 0 .. rows(z_0) - 1)/product(1 - z_p[n]*z^-1, n = 0 .. rows(z_p) - 1)
p_01 = [19.1097i; -2.90284i; 2.90284i; -19.1097i; 24.4114i; -2.2724i; 2.2724i; -24.4114i; 61.3885i; -0.903631i; 0.903631i; -61.3885i]
p_p1 = [-0.421064 - 3.71065i; -1.67482 + 14.7595i; -0.421064 + 3.71065i; -1.67482 - 14.7595i; -1.4546 - 3.39353i; -5.91923 + 13.8094i; -1.4546 + 3.39353i; -5.91923 - 13.8094i; -3.37866 - 2.44884i; -10.7639 + 7.80166i; -3.37866 + 2.44884i; -10.7639 - 7.80166i]
z_0 = [0.0455035 + 0.998964i; 0.958737 - 0.284295i; 0.958737 + 0.284295i; 0.0455035 - 0.998964i; -0.19672 + 0.98046i; 0.97451 - 0.224344i; 0.97451 + 0.224344i; -0.19672 - 0.98046i; -0.808087 + 0.589063i; 0.995926 - 0.090179i; 0.995926 + 0.090179i; -0.808087 - 0.589063i]
z_p = [0.896156 - 0.344545i; 0.260823 + 0.858559i; 0.896156 + 0.344545i; 0.260823 - 0.858559i; 0.818896 - 0.287699i; 0.202044 + 0.640431i; 0.818896 + 0.287699i; 0.202044 - 0.640431i; 0.692394 - 0.177273i; 0.221658 + 0.309809i; 0.692394 + 0.177273i; 0.221658 - 0.309809i]
p_0 = [1.68321i; -1.68321i; 2.29931i; -2.29931i; 6.28184i; -6.28184i]
p_p = [-0.217675 + 1.14751i; -0.217675 - 1.14751i; -0.765831 + 1.08177i; -0.765831 - 1.08177i; -1.46882 + 0.555932i; -1.46882 - 0.555932i]
G_p^(1 - r) = 0.891251
G_p^(1 - r)/K_z0 = 0.0279881
K_z0 = 31.844
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|H_ppf(ZZ(e^(1i*2*π*f_sl/f_d)))| = 0.00621271
G_s = 0.01
20*log(|H_ppf(ZZ(e^(1i*2*π*f_sl/f_d)))|) = -44.1344
-R_s = -40
|H_ppf(ZZ(e^(1i*2*π*f_pl/f_d)))| = 0.846148
G_p = 0.891251
20*log(|H_ppf(ZZ(e^(1i*2*π*f_pl/f_d)))|) = -1.45107
-R_p = -1
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|H_ppf(ZZ(e^(1i*2*π*f_ph/f_d)))| = 0.846148
G_p = 0.891251
20*log(|H_ppf(ZZ(e^(1i*2*π*f_ph/f_d)))|) = -1.45107
-R_p = -1
|H_ppf(ZZ(e^(1i*2*π*f_sh/f_d)))| = 0.00891251
G_s = 0.01
20*log(|H_ppf(ZZ(e^(1i*2*π*f_sh/f_d)))|) = -41
-R_s = -40
B := Root2PolynomZ(z_0)
A := Root2PolynomZ(z_p)
hh_z2 := vectorize(h(tt, H(f) ← HZ(e^(1i*2*π*f/f_d))))
ImError := sum(Im(hh_z2)^2)/samples = 7.52806e-26
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Re(B) = [1; -3.93974; 6.65179; -7.90788; 8.84567; -8.05883; 6.81853; -8.05883; 8.84567; -7.90788; 6.65179; -3.93974; 1]
Re(A) = [1; -6.18394; 18.4856; -35.5943; 49.3313; -51.7519; 42.0009; -26.5283; 12.9413; -4.75283; 1.24892; -0.213615; 0.0186922]
Re(hh_z2) = [
    0.0279881; 0.0628108; 0.057212; -0.0324135; -0.15545; -0.20134; -0.0816732; 0.122361; 0.239648; 0.178481
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]
_ := WRITECSV(Re(hh_z2), "ChebishevIICorected.BandPass.Impulse.csv")
