# https://ru.dsplib.org/content/filter_butter_ap/filter_butter_ap.html
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f_d := 10  # Гц - частота дискретизации
samples := 100
n := 0 .. samples - 1
dt := 1/f_d = 0.1
tt[n] := n*dt
df := f_d/samples = 0.1
h(t, H) := 1/f_d*integral(H(f)*e^(1i*2*π*f*t), f = -f_d/2 .. f_d/2)
db(x) := 10^(x/20)
db_P(x) := 10^(x/10)
to_db(x) := 20*log(|x|)
to_dbP(x) := 10*log(|x|)
roundup(x) := Trunc(x, 1) + (Trunc(x, 1) ≠ x)
abs(z) := |z|
circle_x[n] := cos(2*π/(samples - 1)*n)
circle_y[n] := sin(2*π/(samples - 1)*n)
Z(p_0, f_d) := (2*f_d + p_0)/(2*f_d - p_0)
Ω(T_d, ω) := 2/T_d*tan(ω/2)
f_analog(f_digital., f_d) := f_d/π*tan(π*f_digital./f_d)
f_p := 4/(2*π) = 0.63662  # Гц - частота пропускания
f_p1 := 500
f_d1 := 5000
f_s := 2/(2*π) = 0.31831  # Гц - частота подавления
ω_p := 2*π*f_p = 1.27324*π
# Нормированная полоса среза
ω_p = 4
f_s1 := 1500
ω_s := 2*π*f_s = 0.63662*π
# Нормированная полоса заграждения
ω_s = 2
ω_p1 := 2*π*f_p1/f_d1 = 0.2*π
R_p := 1
(-R_p) db = 0.891251  # Неравномерность в полосе пропускания (дБ)
ω_s1 := 2*π*f_s1/f_d1 = 0.6*π
R_s := 40
(-R_s) db = 0.01  # Уровень подавления в полосе заграждения (дБ)
F_p := f_analog(f_p, f_d) = 0.645246
F_s := f_analog(f_s, f_d) = 0.319375
Ω_p := 2*π*F_p = 4.0542  # Частота среза аналогового фильтра
Ω_s := 2*π*F_s = 2.00669  # Частота заграждения аналогового фильтра
# Порядок фильтра
ε_p := sqrt(10^(R_p/10) - 1) = 0.508847
G_p := (-R_p) db = 0.891251
ε_s := sqrt(10^(R_s/10) - 1) = 99.995
1/ε_s = 0.0100005
G_s := (-R_s) db = 0.01
ε_s/ε_p = 196.513
ln(ε_s/ε_p) = 5.28073
Ω_s/Ω_p = 0.494966
ln(Ω_s/Ω_p) = -0.703265
# Порядок фильтра
N := ln(ε_s/ε_p)/ln(F_p/F_s) = 7.50887
N1 := N
N := ceil(N) = 8
α := 1/nthroot(ε_p, N) = 1.08812
N1 = 7.50887
poles(r, L) :=
    P[0] ← -α if r ≠ 0
    for n ∈ 1 .. L
        θ ← π*(n - 0.5)/N
        P[n*2 + r - 2] ← α*(-sin(θ) + 1i*cos(θ))
        P[n*2 + r - 1] ← α*(-sin(θ) - 1i*cos(θ))
    P
# Число парных полюсов
ConjV(z) := [z; Re(z) - 1i*Im(z)]
L := Trunc(N/2, 1) = 4
r := mod(N, 2) = 0
2*L + r = 8
θ(n) := (2*n - 1)/(2*N)*π
θ(n) := π/N*(n - 1/2)
θ(n) := π*(n - 0.5)/N
poles(r, L) :=
    P[0] ← -α if r ≠ 0
    for n ∈ 1 .. L
        [P[n*2 + r - 2]; P[n*2 + r - 1]] ← ConjV(α*e^(1i*(π*((n - 0.5)/N + 0.5))))
    P
p_p := poles(r, L)
p_0 := matrix(N, 1, f(n, m) ← 0)
p_p1 := Ω_p/p_p
Kz(p) := 1/product(2*f_d - p[n], n = 0 .. N - 1)
p_p1 = [-0.726883 - 3.65429i; -0.726883 + 3.65429i; -2.06999 - 3.09795i; -2.06999 + 3.09795i; -3.09795 - 2.06999i; -3.09795 + 2.06999i; -3.65429 - 0.726883i; -3.65429 + 0.726883i]
z0 := vectorize(Z(p_p, f_d))
Kz1 := Kz(p_p1) = 1.50907e-11
z1 := vectorize(Z(p_p1, f_d))
z_01 := vectorize(Z(p_0, f_d))
z_01 = [1; 1; 1; 1; 1; 1; 1; 1]
z1 = [0.871681 - 0.32999i; 0.871681 + 0.32999i; 0.777395 - 0.249492i; 0.777395 + 0.249492i; 0.717958 - 0.15396i; 0.717958 + 0.15396i; 0.68943 - 0.0519152i; 0.68943 + 0.0519152i]
z0 = [0.973493 + 0.104201i; 0.973493 - 0.104201i; 0.937585 + 0.0850788i; 0.937585 - 0.0850788i; 0.911843 + 0.055287i; 0.911843 - 0.055287i; 0.898492 + 0.01913i; 0.898492 - 0.01913i]
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H(p) := p^N/product(p - p_p1[n], n = 0 .. N - 1)
G_z0 := product(1 + z1[n], n = 0 .. N - 1)/product(1 + z_01[n], n = 0 .. N - 1)
H_z2(z) := G_z0*product(1 - z_01[n]*z^-1, n = 0 .. N - 1)/product(1 - z1[n]*z^-1, n = 0 .. N - 1)
H_z(z) := H(2*f_d*(1 - z^-1)/(1 + z^-1))
Z(0, f_d) = 1
Mdb := [0.1*F_s, -R_s; F_s, -R_s; F_s, -R_p; F_p, -R_p]
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M := [0.1*f_s, (-R_s) db; f_s, (-R_s) db; f_s, (-R_p) db; f_p, (-R_p) db]
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hh_z2 := vectorize(h(tt, H(f) ← H_z2(e^(1i*2*π*f/f_d))))
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ff := 0, 2*f_d/100 .. f_d
Φ(f) := integral(-|d/df1(arg(H_z(e^(1i*2*π*f1/f_d)))/π)|, f1 = 0 .. f)
Φ(f_p)/N = -0.279735
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