# Рассчёт фильтра Чебышева I-рода
# https://ru.dsplib.org/content/filter_cheby1_ap/filter_cheby1_ap.html
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f_d := 10
samples := 100
n := 0 .. samples - 1
dt := 1/f_d = 0.1
tt[n] := n*dt
db(x) := 10^(x/20)
db_P(x) := 10^(x/10)
to_db(x) := 20*log(|x|)
to_dbP(x) := 10*log(|x|)
roundup(x) := Trunc(x, 1) + (Trunc(x, 1) ≠ x)
abs(z) := |z|
circle_x[n] := cos(2*π/(samples - 1)*n)
circle_y[n] := sin(2*π/(samples - 1)*n)
Ki(k) :=
    k_0 ← k/(1 + sqrt(1 - k*k))
    k_0*k_0
K(k) :=
    ki ← Ki(k)
    (1 + ki)*K(ki) if k - ki > 0
    π/2 otherwise
T(k) := K(sqrt(1 - k*k))
sn(u, k) :=
    ki ← Ki(k)
    sin(u*π/2) if k - ki ≤ 0
    otherwise
        w ← sn(u, ki)
        (1 + ki)/(1/w + ki*w)
cd(u, k) :=
    ki ← Ki(k)
    cos(u*π/2) if k - ki ≤ 0
    otherwise
        w ← cd(u, ki)
        (1 + ki)/(1/w + ki*w)
sn_inv(sn, k) :=
    ki ← Ki(k)
    sn_inv(2*sn/((1 + ki)*(1 + sqrt(1 - k*k*sn*sn))), ki) if k - ki > 0
    2*asin(sn)/π
cd_inv(cn, k) :=
    ki ← Ki(k)
    cd_inv(2*cn/((1 + ki)*(1 + sqrt(1 - k*k*cn*cn))), ki) if k - ki > 0
    2*acos(cn)/π
K(0.66667) = 1.80967
T(0.66667) = 1.90424
K(0.0028615) = 1.5708
T(0.0028615) = 7.24272
df := f_d/samples = 0.1
Integral(f, x1, x2, dx) :=
    x ← x1
    y ← f(x)
    while x ≤ x2
        x ← x + dx
        S ← S + y + (y ← f(x))
    S*0.5*dx
Z(p_0, f_d) := (2*f_d + p_0)/(2*f_d - p_0)
z2p(z_0, f_d) := 2*f_d*(1 - z_0^-1)/(1 + z_0^-1)
cd(0.6, 0.93) = 0.761809
sn(0.6, 0.93) = 0.917919
# 0.917918 | 0.761809423
C(N, ω) := cos(N*acos(ω))
sh(x) := sinh(x)
ch(x) := cosh(x)
arsh(x) := asinh(x)
arch(x) := acosh(x)
h(t, H) := 1/f_d*integral(H(f)*e^(1i*2*π*f*t), f = -f_d/2 .. f_d/2)
h2(t, H) := 1/f_d*Integral(y(f) ← H(f)*e^(1i*2*π*f*t), -f_d/2, f_d/2, f_d/2001)
f_p := 4/(2*π)  # Гц - частота пропускания
# Гц - частота дискретизации
ConjV(z) := [z; Re(z) - 1i*Im(z)]
Root2PolynomP(P) :=
    N ← rows(P) + 1
    a[N - 1] ← 0
    [a[0]; a[1]] ← [-P[0]; 1]
    for n ∈ 2 .. N - 1
        a[n] ← 1
        root ← P[n - 1]
        for i ∈ n - 1 .. 1
            a[i] ← a[i - 1] - a[i]*root
        a[0] ← -a[0]*root
    a
Root2PolynomZ(Z) :=
    N ← rows(Z) + 1
    [a[N - 1]; a[N - 2]] ← [-Z[0]; 1]
    for k ∈ 2 .. N - 1
        a[N - 1 - k] ← a[N - 1 - k + 1]
        for i ∈ k - 1 .. 1
            a[N - 1 - i] ← a[N - 1 - (i - 1)] - a[N - 1 - i]*Z[k - 1]
        a[N - 1] ← -a[N - 1]*Z[k - 1]
    a
f_s := 2/(2*π)  # Гц - частота подавления
ω_p := 2*π*f_p = 4
# Нормированная полоса среза
ω_p = 4
ω_s := 2*π*f_s = 2
# Нормированная полоса заграждения
ω_s = 2
R_p := 1
G_p := (-R_p) db = 0.891251  # Неравномерность в полосе пропускания (дБ)
R_s := 40
G_s := (-R_s) db = 0.01  # Уровень подавления в полосе заграждения (дБ)
Ω(T_d, ω) := 2/T_d*tan(ω/2)  # Преобразование частот аналогового фильтра в частоты цифрового
f_analog(f_digital., f_d) := f_d/π*tan(π*f_digital./f_d)
f_digit(f_analog, f_d) := f_d/π*atan(π*f_analog/f_d)
F_p := f_analog(f_p, f_d) = 0.645246
F_p = 0.0645246 f_d
f_digit(F_p, f_d) = 0.63662
F_s := f_analog(f_s, f_d) = 0.319375
F_s = 0.0319375 f_d
Ω_p := 2*π*F_p = 4.0542  # Частота среза аналогового фильтра
Ω_s := 2*π*F_s = 2.00669  # Частота заграждения аналогового фильтра
# Порядок фильтра
ε_p := sqrt(10^(R_p/10) - 1) = 0.508847
ε_s := sqrt(10^(R_s/10) - 1) = 99.995
1/ε_s = 0.0100005
G_p := 1/sqrt(1 + ε_p^2) = 0.891251
ε_s/ε_p = 196.513
Ω_s/Ω_p = 0.494966
ω_p = 4
k_ω := ω_p/ω_s = 2
k_ε := ε_s/ε_p = 196.513
ω_s = 2
arcos(z) := ln(z + sqrt(z^2 - 1))
# Порядок фильтра
arch(ε_s/ε_p) = 5.97387
N := arch(k_ε)/arch(k_ω) = 4.53611
N := ceil(N) = 5
arcos(ε_s/ε_p) = 5.97387
# Число парных полюсов
# Наличие/отсутсвтие центрального полюса
G_p := 1/sqrt(1 + ε_p^2) = 0.891251
L := Trunc(N/2, 1) = 2
r := mod(N, 2) = 1
2*L + r = 5
β := 1/N*arsh(1/ε_p) = 0.285595
θ(n) := (2*n - 1)/(2*N)*π
θ(n) := π/N*(n - 1/2)
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poles(r, L) :=
    P[0] ← -sh(β) if r ≠ 0
    for n ∈ 1 .. L
        [P[(n - 1)*2 + r + 0]; P[(n - 1)*2 + r + 1]] ← ConjV(1i*cos(π*(n - 0.5)/N - 1i*β))
    P
p_p := poles(r, L)
p_p = [-0.289493; -0.0894584 + 0.990107i; -0.0894584 - 0.990107i; -0.234205 + 0.61192i; -0.234205 - 0.61192i]
G_0 := 1/product(-p_p[i], i = 0 .. rows(p_p) - 1)
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H_0(p) := G_p^(1 - r)/G_0*1/product(p - p_p[i], i = 0 .. rows(p_p) - 1)
Ω_p/f_d = 0.40542
ω_p = 4
H_0(0) = 1
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# Масштабируем передаточную функцию фильтра на требуемую частоту пропускания
Ω_p := 2*π*F_p
H(p) := G_p^r*H_0(p/Ω_p)
# Делаем преобразование плоскости p в плоскость z путём подстановки p == 2*f_d*(1 - z^-1)/(1 + z^-1)
Polinom(P, p) := product(p - P[i], i = 0 .. rows(P) - 1)
H_z(z) := H(2*f_d*(1 - z^-1)/(1 + z^-1))
Ω_p = 4.0542
# Масштабируем нули и полюса
Z(p, f_d) := (2*f_d + p)/(2*f_d - p)
p_p1 := Ω_p/p_p
p_0 := matrix(N, 1, f(n, m) ← 0)
Kz(p) := 1/product(2*f_d - p[n], n = 0 .. N - 1)
p_p1 = [-14.0045; -0.36697 - 4.06155i; -0.36697 + 4.06155i; -2.21178 - 5.77884i; -2.21178 + 5.77884i]
z0 := vectorize(Z(p_p, f_d))
Kz1 := Kz(p_p1) = 1.29438e-7
z1 := vectorize(Z(p_p1, f_d))
z_01 := vectorize(Z(p_0, f_d))
z_01 = [1; 1; 1; 1; 1]
z1 = [0.176316; 0.888849 - 0.376672i; 0.888849 + 0.376672i; 0.686677 - 0.438823i; 0.686677 + 0.438823i]
z0 = [0.971464; 0.986269 + 0.0978931i; 0.986269 - 0.0978931i; 0.975044 + 0.059729i; 0.975044 - 0.059729i]
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Mdb := [0.1*F_s, -R_s; F_s, -R_s; F_s, -R_p; F_p, -R_p]
H(p) := p^N/product(p - p_p1[n], n = 0 .. N - 1)
G_z0 := product(1 + z_01[n], n = 0 .. N - 1)/product(1 + z1[n], n = 0 .. N - 1)
H_z2(z) := G_p^(1 - r)/G_z0*product(1 - z_01[n]*z^-1, n = 0 .. N - 1)/product(1 - z1[n]*z^-1, n = 0 .. N - 1)
H_z(z) := G_p^(1 - r)*H(2*f_d*(1 - z^-1)/(1 + z^-1))
Z(0, f_d) = 1
B := G_p^(1 - r)/G_z0*Root2PolynomZ(z_01)
A := Root2PolynomZ(z1)
G_p^(1 - r) = 1
Re(B) = [0.414203; -2.07102; 4.14203; -4.14203; 2.07102; -0.414203]
Re(A) = [1; -3.32737; 4.59301; -3.17229; 1.0527; -0.10912]
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M := [0.1*f_s, (-R_s) db; f_s, (-R_s) db; f_s, (-R_p) db; f_p, (-R_p) db]
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hh_z2 := vectorize(h(tt, H(f) ← H_z2(e^(1i*2*π*f/f_d))))
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ff := 0, 2*f_d/100 .. f_d
Φ(f) := integral(-|d/df1(arg(H_z(e^(1i*2*π*f1/f_d)))/π)|, f1 = 0 .. f)
Φ(f_p)/N = -0.157541
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