# Рассчёт фильтра Чебышева II-рода
# https://ru.dsplib.org/content/filter_cheby2_ap/filter_cheby2_ap.html
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f_d := 10  # Гц - частота дискретизации
samples := 100
n := 0 .. samples - 1
dt := 1/f_d = 0.1
tt[n] := n*dt
h(t, H) := 1/f_d*integral(H(f)*e^(1i*2*π*f*t), f = -f_d/2 .. f_d/2)
df := f_d/samples = 0.1
db(x) := 10^(x/20)
db_P(x) := 10^(x/10)
to_db(x) := 20*log(|x|)
to_dbP(x) := 10*log(|x|)
roundup(x) := Trunc(x, 1) + (Trunc(x, 1) ≠ x)
abs(z) := |z|
circle_x[n] := cos(2*π/(samples - 1)*n)
circle_y[n] := sin(2*π/(samples - 1)*n)
Ki(k) :=
    k_0 ← k/(1 + sqrt(1 - k*k))
    k_0*k_0
K(k) :=
    ki ← Ki(k)
    (1 + ki)*K(ki) if k - ki > 0
    π/2 otherwise
T(k) := K(sqrt(1 - k*k))
sn(u, k) :=
    ki ← Ki(k)
    sin(u*π/2) if k - ki ≤ 0
    otherwise
        w ← sn(u, ki)
        (1 + ki)/(1/w + ki*w)
cd(u, k) :=
    ki ← Ki(k)
    cos(u*π/2) if k - ki ≤ 0
    otherwise
        w ← cd(u, ki)
        (1 + ki)/(1/w + ki*w)
sn_inv(sn, k) :=
    ki ← Ki(k)
    sn_inv(2*sn/((1 + ki)*(1 + sqrt(1 - k*k*sn*sn))), ki) if k - ki > 0
    2*asin(sn)/π
cd_inv(cn, k) :=
    ki ← Ki(k)
    cd_inv(2*cn/((1 + ki)*(1 + sqrt(1 - k*k*cn*cn))), ki) if k - ki > 0
    2*acos(cn)/π
K(0.66667) = 1.80967
T(0.66667) = 1.90424
K(0.0028615) = 1.5708
T(0.0028615) = 7.24272
Z(p_0, f_d) := (2*f_d + p_0)/(2*f_d - p_0)
z2p(z_0, f_d) := 2*f_d*(1 - z_0^-1)/(1 + z_0^-1)
Integral(f, x1, x2, dx) :=
    x ← x1
    y ← f(x)
    while x ≤ x2
        x ← x + dx
        S ← S + y + (y ← f(x))
    S*0.5*dx
SinCos(x) := [sin(x); cos(x)]
cd(0.6, 0.93) = 0.761809
sn(0.6, 0.93) = 0.917919
# 0.917918 | 0.761809423
C(N, ω) := cos(N*acos(ω))
sh(x) := sinh(x)
ch(x) := cosh(x)
arsh(x) := asinh(x)
arch(x) := acosh(x)
ShCh(x) := [sh(x); ch(x)]
ConjV(z) := [Re(z) + 1i*Im(z); Re(z) - 1i*Im(z)]
h2(t, H) := 1/f_d*Integral(y(f) ← H(f)*e^(1i*2*π*f*t), -f_d/2, f_d/2, f_d/2001)
f_p := 4/(2*π)  # Гц - частота пропускания
Root2PolynomP(P) :=
    N ← rows(P) + 1
    a[N - 1] ← 0
    [a[0]; a[1]] ← [-P[0]; 1]
    for n ∈ 2 .. N - 1
        a[n] ← 1
        root ← P[n - 1]
        for i ∈ n - 1 .. 1
            a[i] ← a[i - 1] - a[i]*root
        a[0] ← -a[0]*root
    a
Root2PolynomZ(Z) :=
    N ← rows(Z) + 1
    [a[N - 1]; a[N - 2]] ← [-Z[0]; 1]
    for k ∈ 2 .. N - 1
        a[N - 1 - k] ← a[N - 1 - k + 1]
        for i ∈ k - 1 .. 1
            a[N - 1 - i] ← a[N - 1 - (i - 1)] - a[N - 1 - i]*Z[k - 1]
        a[N - 1] ← -a[N - 1]*Z[k - 1]
    a
f_s := 2/(2*π)
# Гц - частота подавления
ω_p := 2*π*f_p = 4
# Нормированная полоса среза
ω_p = 4
ω_s := 2*π*f_s = 2
# Нормированная полоса заграждения
ω_s = 2
R_p := 1
G_p := (-R_p) db = 0.891251  # Неравномерность в полосе пропускания (дБ)
R_s := 40
G_s := (-R_s) db = 0.01  # Уровень подавления в полосе заграждения (дБ)
Ω(T_d, ω) := 2/T_d*tan(ω/2)  # Преобразование частот аналогового фильтра в частоты цифрового
f_analog(f_digital., f_d) := f_d/π*tan(π*f_digital./f_d)
f_digit(f_analog, f_d) := f_d/π*atan(π*f_analog/f_d)
F_p := f_analog(f_p, f_d) = 0.645246
F_p = 0.0645246 f_d
f_digit(F_p, f_d) = 0.63662
f_p = 0.63662
F_s := f_analog(f_s, f_d) = 0.319375
F_s = 0.0319375 f_d
F11 := f_analog(f_p, f_d) = 0.645246
Ω_p := 2*π*F_p = 4.0542  # Частота среза аналогового фильтра
f11 := f_digit(F11, f_d) = 0.63662
Ω_s := 2*π*F_s = 2.00669  # Частота заграждения аналогового фильтра
# Порядок фильтра
ε_p := sqrt(10^(R_p/10) - 1) = 0.508847
ε_s := sqrt(10^(R_s/10) - 1) = 99.995
1/ε_s = 0.0100005
G_p := 1/sqrt(1 + ε_p^2) = 0.891251
ε_s/ε_p = 196.513
Ω_s/Ω_p = 0.494966
k_ω := ω_p/ω_s = 2
k_ε := ε_s/ε_p = 196.513
f_p/f_s = 2
# Порядок фильтра
N := arch(k_ε)/arch(k_ω) = 4.53611
N := ceil(N) = 5
# Число парных полюсов | Наличие/отсутсвтие центрального полюса
L := Trunc(N/2, 1) = 2
r := mod(N, 2) = 1
2*L + r = 5
G_s := 1/sqrt(1 + ε_s^2) = 0.01
G_p := 1/sqrt(1 + ε_p^2) = 0.891251
β := 1/N*arsh(ε_s) = 1.05966
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θ(n) := (2*n - 1)/(2*N)*π
θ(n) := π*(n - 0.5)/N
conj(z) := Re(z) - 1i*Im(z)
poles(r, L) :=
    i ← 0
    [shβ; chβ] ← ShCh(β)
    if r ≠ 0
        P[i] ← -k_ω/shβ
        i ← 1
    for n ∈ 1 .. L
        θ ← π*(n - 0.5)/N
        [sinθ; cosθ] ← SinCos(π*(n - 0.5)/N)
        [P[2*n + r - 2]; P[2*n + r - 1]] ← ConjV(k_ω*(-sinθ*shβ + 1i*cosθ*chβ)/(sinθ^2*shβ^2 + cosθ^2*chβ^2))
        i ← i + 2
    P
zeros(L) :=
    for n ∈ 1 .. L
        [P[2*n - 2]; P[2*n - 1]] ← ConjV(1i*k_ω/cos(π*(n - 0.5)/N))
    P
p_p := poles(r, L)
p_0 := zeros(L)
G_0 := product(-p_0[i], i = 0 .. rows(p_0) - 1)/product(-p_p[i], i = 0 .. rows(p_p) - 1)
H_0(p) := 1/G_0*product(p - p_0[i], i = 0 .. rows(p_0) - 1)/product(p - p_p[i], i = 0 .. rows(p_p) - 1)
H(p) := H_0(Ω_p/p)
Z(p, f_d) := (2*f_d + p)/(2*f_d - p)
p_0 = [2.10292i; -2.10292i; 3.4026i; -3.4026i]
p_p = [-1.57554; -0.311831 + 1.22174i; -0.311831 - 1.22174i; -1.0496 + 0.970778i; -1.0496 - 0.970778i]
p_p1 := Ω_p/p_p
p_01 :=
    stack(0, Ω_p/p_0) if r > 0
    Ω_p/p_0 otherwise
Polinom(P, p) := product(p - P[i], i = 0 .. rows(P) - 1)
p_01 = [0; -1.92789i; 1.92789i; -1.1915i; 1.1915i]
p_p1 = [-2.57321; -0.795166 - 3.11543i; -0.795166 + 3.11543i; -2.08177 - 1.92544i; -2.08177 + 1.92544i]
H_z(z) := H(2*f_d*(1 - z^-1)/(1 + z^-1))
Kz(p) := 1/product(2*f_d - p[n], n = 0 .. N - 1)
z_0 := vectorize(Z(p_01, f_d))
z_p := vectorize(Z(p_p1, f_d))
z_0 = [1; 0.981587 - 0.191014i; 0.981587 + 0.191014i; 0.992927 - 0.118729i; 0.992927 + 0.118729i]
z_p = [0.772012; 0.881299 - 0.281847i; 0.881299 + 0.281847i; 0.79778 - 0.156759i; 0.79778 + 0.156759i]
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Mdb := [0.1*F_s, -R_s; F_s, -R_s; F_s, -R_p; F_p, -R_p]
z_0 = [1; 0.981587 - 0.191014i; 0.981587 + 0.191014i; 0.992927 - 0.118729i; 0.992927 + 0.118729i]
z_p = [0.772012; 0.881299 - 0.281847i; 0.881299 + 0.281847i; 0.79778 - 0.156759i; 0.79778 + 0.156759i]
H(p) := product(p - p_01[n], n = 0 .. rows(p_01) - 1)/product(p - p_p1[n], n = 0 .. rows(p_p1) - 1)
G_z0 := product(1 + z_p[n], n = 0 .. N - 1)/product(1 + z_0[n], n = 0 .. N - 1)
H_z2(z) := G_z0*product(1 - z_0[n]*z^-1, n = 0 .. rows(z_0) - 1)/product(1 - z_p[n]*z^-1, n = 0 .. rows(z_p) - 1)
H_z(z) := H(2*f_d*(1 - z^-1)/(1 + z^-1))
N = 5
Z(p, f_d) := (2*f_d + p)/(2*f_d - p)
K_z := product(2*f_d - p_01[n], n = 0 .. rows(p_01) - 1)/product(2*f_d - p_p1[n], n = 0 .. rows(p_p1) - 1) = 0.660983
H_z3(z) := K_z*product(1 - ((2*f_d + p_01[n])/(2*f_d - p_01[n]))*z^-1, n = 0 .. rows(p_01) - 1)/product(1 - ((2*f_d + p_p1[n])/(2*f_d - p_p1[n]))*z^-1, n = 0 .. rows(p_p1) - 1)
K_z = 0.660983
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M := [0.1*f_s, (-R_s) db; f_s, (-R_s) db; f_s, (-R_p) db; f_p, (-R_p) db]
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