# https://ru.dsplib.org/content/filter_butter_ap/filter_butter_ap.html
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C(n, k) :=
    1 if k == 0
    product((n - k + i)/i, i = 1 .. k) otherwise
C(6, 2) = 15
f_d := 10  # Гц - частота дискретизации
samples := 100
n := 0 .. samples - 1
dt := 1/f_d = 0.1
df := f_d/samples = 0.1
ConjV(z) := [z; Re(z) - 1i*Im(z)]
h(t, H) := 1/f_d*integral(H(f)*e^(1i*2*π*f*t), f = -f_d/2 .. f_d/2)
tt[n] := n*dt
db(x) := 10^(x/20)
db_P(x) := 10^(x/10)
to_db(x) := 20*log(|x|)
to_dbP(x) := 10*log(|x|)
roundup(x) := Trunc(x, 1) + (Trunc(x, 1) ≠ x)
abs(z) := |z|
circle_x[n] := cos(2*π/(samples - 1)*n)
circle_y[n] := sin(2*π/(samples - 1)*n)
Z(p_0, f_d) := (2*f_d + p_0)/(2*f_d - p_0)
f_analog(f_digital., f_d) := f_d/π*tan(π*f_digital./f_d)
Ω(T_d, ω) := 2/T_d*tan(ω/2)  # Преобразование частот аналогового фильтра в частоты цифрового
Filter(A, B, X) :=
    N ← rows(A)
    S[N - 1] ← 0
    Y[rows(X) - 1] ← 0
    a0 ← 1/A[0]
    for i ∈ 0 .. rows(X) - 1
        x ← X[i]
        y ← 0
        for j ∈ N - 1 .. 1
            [S[j], v] ← [1, 1]*S[j - 1]
            y ← y + v*B[j]*a0
            x ← x - v*A[j]*a0
        S[0] ← x
        Y[i] ← y + x*B[0]*a0
    Y
Root2PolynomP(P) :=
    N ← rows(P) + 1
    a[N - 1] ← 0
    [a[0]; a[1]] ← [-P[0]; 1]
    for n ∈ 2 .. N - 1
        a[n] ← 1
        root ← P[n - 1]
        for i ∈ n - 1 .. 1
            a[i] ← a[i - 1] - a[i]*root
        a[0] ← -a[0]*root
    a
ω_p := 2 = 0.63662*π
# Нормированная полоса среза
ω_p = 2
Root2PolynomZ(Z) :=
    N ← rows(Z) + 1
    [a[N - 1]; a[N - 2]] ← [-Z[0]; 1]
    for k ∈ 2 .. N - 1
        a[N - 1 - k] ← a[N - 1 - k + 1]
        for i ∈ k - 1 .. 1
            a[N - 1 - i] ← a[N - 1 - (i - 1)] - a[N - 1 - i]*Z[k - 1]
        a[N - 1] ← -a[N - 1]*Z[k - 1]
    a
ω_s := 4 = 1.27324*π
# Нормированная полоса заграждения
ω_s = 4
f_p := ω_p/(2*π)  # Гц - частота пропускания
f_p = 0.31831
f_s := ω_s/(2*π)  # Гц - частота подавления
f_s = 0.63662
R_p := 1
G_p := (-R_p) db = 0.891251  # Неравномерность в полосе пропускания (дБ)
R_s := 40
G_s := (-R_s) db = 0.01  # Уровень подавления в полосе заграждения (дБ)
sqrt(10^(R_p/10) - 1) = 0.508847
F_p := f_analog(f_p, f_d) = 0.319375
10^(R_p/10) = 1.25893
F_s := f_analog(f_s, f_d) = 0.645246
Ω_p := 2*π*F_p = 2.00669  # Частота среза аналогового фильтра
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20*log(R_p) = 0
db(-R_p) = 0.891251
Ω_s := 2*π*F_s = 4.0542  # Частота заграждения аналогового фильтра
# Порядок фильтра
10^(-R_p/20) = 0.891251
ε_p := sqrt(10^(R_p/10) - 1) = 0.508847
k_ω :=
    [Σ, Δ] ← π/f_d*[f_s + f_p, f_s - f_p]
    (sin(Σ) + sin(Δ))/(sin(Σ) - sin(Δ))
    = 2.02034
ε_s := sqrt(10^(R_s/10) - 1) = 99.995
1/ε_s = 0.0100005
k_ε := ε_s/ε_p = 196.513
ln(k_ε) = 5.28073
k_Ω := F_s/F_p = 2.02034
ln(k_Ω) = 0.703265
k_ε := sqrt((1/G_s^2 - 1)/(1/G_p^2 - 1)) = 196.513
Ω_s = 4.0542
# Порядок фильтра
Ω_p = 2.00669
0.5*ln((1/G_s^2 - 1)/(1/G_p^2 - 1))/ln(tan(π*f_s*dt)/tan(π*f_p*dt)) = 7.50887
N := ln(k_ε)/ln(k_Ω) = 7.50887
N1 := N
N := ceil(N) = 8
α := 1/nthroot(ε_p, N) = 1.08812
N1 = 7.50887
# Число парных полюсов
L := Trunc(N/2, 1) = 4
r := mod(N, 2) = 0
2*L + r = 8
θ(n) := (2*n - 1)/(2*N)*π
θ(n) := π/N*(n - 1/2)
π/2*((i - r) - 1)/N
H_0(p) := 1/ε_p/((p - (-α))^r*product(p^2 + 2*α*sin(θ(n))*p + α^2, n = 1 .. L))
H_1(p) := 1/ε_p/((p - (-α))^r*product((p - α*(-sin(θ(n)) + 1i*cos(θ(n))))*(p - α*(-sin(θ(n)) - 1i*cos(θ(n)))), n = 1 .. L))
tth(N) :=
    dθ ← 0.5*π/N
    for i ∈ r, r + 2 .. N - 1
        θ[i/2] ← dθ*(i - r + 1)
        [s, c] ← [sin(θ), cos(θ)]
        [p[i]; p[i + 1]] ← -α*[s - 1i*c; s + 1i*c]
    θ
poles(N, α) :=
    r ← mod(N, 2)
    p[0] ← -α if r > 0
    dθ ← 0.5*π/N
    for i ∈ r, r + 2 .. N - 1
        θ ← dθ*(i - r + 1)
        [p[i]; p[i + 1]] ← ConjV(α*e^(1i*(dθ*(i - r + 1 + N))))
    p
p0 := poles(r, L)  # disabled
p0 := poles(N, α)
z0 := vectorize(Z(p0, f_d))
Kz(p) := 1/product(2*f_d - p[n], n = 0 .. N - 1)
p1 := p0*Ω_p
z1 := vectorize(Z(p1, f_d))
Kz1 := Kz(p1) = 2.23387e-11
Kx2 := product((1 - z1[n])/2, n = 0 .. rows(z1) - 1) = 1.1543e-8
z0 := matrix(N, 1, f(n, m) ← -1)
H_z2(z) := Kz1*Ω_p^N*1/ε_p*(1 + z^-1)^N/product(1 - z1[n]*z^-1, n = 0 .. N - 1)
H_2(p) := 1/ε_p*1/product(p - p1[n], n = 0 .. N - 1)
H(p) := Ω_p^N*H_2(p)
Kz1*Ω_p^N*1/ε_p = 1.1543e-8
poles(5, α) = [-1.08812; -0.336247 + 1.03486i; -0.336247 - 1.03486i; -0.880307 + 0.639581i; -0.880307 - 0.639581i]
tth(N) = [0.19635; 0.589049; 0.981748; 1.37445]
p0 = [-0.212282 + 1.06721i; -0.212282 - 1.06721i; -0.604527 + 0.904738i; -0.604527 - 0.904738i; -0.904738 + 0.604527i; -0.904738 - 0.604527i; -1.06721 + 0.212282i; -1.06721 - 0.212282i]
p1 = [-0.425984 + 2.14157i; -0.425984 - 2.14157i; -1.2131 + 1.81553i; -1.2131 - 1.81553i; -1.81553 + 1.2131i; -1.81553 - 1.2131i; -2.14157 + 0.425984i; -2.14157 - 0.425984i]
z1 = [0.936998 + 0.203085i; 0.936998 - 0.203085i; 0.871916 + 0.160209i; 0.871916 - 0.160209i; 0.827904 + 0.101645i; 0.827904 - 0.101645i; 0.805888 + 0.0347437i; 0.805888 - 0.0347437i]
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(2*π*F_p)^N*Kz1/ε_p = 1.1543e-8
p1 = [-0.425984 + 2.14157i; -0.425984 - 2.14157i; -1.2131 + 1.81553i; -1.2131 - 1.81553i; -1.81553 + 1.2131i; -1.81553 - 1.2131i; -2.14157 + 0.425984i; -2.14157 - 0.425984i]
H(p) := H_2(p/(2*π*F_p))  # disabled
H_z(z) := H(2*f_d*(1 - z^-1)/(1 + z^-1))
H_z(1) = 1
H(1i*2*π*F_p) = 0.65374 + 0.605765i
|H(1i*2*π*F_p)| = 0.891251
product(p - p1[n], n = 0 .. N - 1)
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B := Kz1*Ω_p^N*1/ε_p*Re(Root2PolynomZ(z0))
A := Re(Root2PolynomZ(z1))
TraceV(V) :=
    S ← ""
    for i ∈ 0 .. rows(V) - 1
        S ← concat(S, "| ", num2str(V[i]))
    S
SkipN := round(5/f_p/dt) = 157
RR(h) :=
    N ← rows(h) - 1
    rr[N] ← 0
    for i ∈ 1 .. N
        rr[i] ← rr[i - 1] + h[i]
    rr
B = [1.1543e-8; 9.23441e-8; 3.23204e-7; 6.46409e-7; 8.08011e-7; 6.46409e-7; 3.23204e-7; 9.23441e-8; 1.1543e-8]
A = [1; -6.88541; 20.8098; -36.0507; 39.1479; -27.2826; 11.9148; -2.98081; 0.327037]
P(v) := sum(vectorize(v^2))/rows(v)
f_0 := f_p + (f_s - f_p)*0.4
s(t) := sin(2*π*f_0*t)
samples := 400
n := 0 .. samples - 1
tt[n] := n*dt
ss := s(tt)
(rows(ss) - SkipN)/rows(ss) = 60.75 %
hh_z := vectorize(h(tt, H(f) ← H_z2(e^(1i*2*π*f/f_d))))
rr_z := RR(hh_z)
yy := Filter(A, B, ss)
xx :=
    x[samples - 1] ← 0
    x[0] ← 1
    x
h_z2 := Filter(A, B, xx)
r_z2 := RR(h_z2)
tt_1 := submatrix(tt, SkipN, rows(tt) - 1, 0, 0)
ss_1 := submatrix(ss, SkipN, rows(ss) - 1, 0, 0)
yy_1 := submatrix(yy, SkipN, rows(yy) - 1, 0, 0)
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P(yy_1) = 0.00833493
P(yy_1)/P(ss_1) = 0.0166328
P(ss_1) = 0.501116
G_p = 0.891251
ff := 0, 2*f_d/100 .. f_d
Φ(f) := integral(-|d/df1(arg(H_z(e^(1i*2*π*f1/f_d)))/π)|, f1 = 0 .. f)
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ln(tan(π*f_s*dt)) - ln(tan(π*f_p*dt)) == 0.5*ln((1/G_s^2 - 1)/(1/G_p^2 - 1))/8
ln(tan(π*f_s*dt)) == 0.5*ln((1/G_s^2 - 1)/(1/G_p^2 - 1))/N + ln(tan(π*f_p*dt))
tan(π*f_s*dt) == exp(0.5*ln((1/G_s^2 - 1)/(1/G_p^2 - 1))/N + ln(tan(π*f_p*dt)))
ln(tan(π*f_p*dt)) == ln(tan(π*f_s*dt)) - 0.5*ln((1/G_s^2 - 1)/(1/G_p^2 - 1))/N
π*f_s*dt == atan(exp(0.5*ln((1/G_s^2 - 1)/(1/G_p^2 - 1))/N + ln(tan(π*f_p*dt))))
tan(π*f_p*dt) == exp(ln(tan(π*f_s*dt)) - 0.5*ln((1/G_s^2 - 1)/(1/G_p^2 - 1))/N)
f_s1 := atan(exp(0.5*ln((1/G_s^2 - 1)/(1/G_p^2 - 1))/N + ln(tan(π*f_p*dt))))/(π*dt) = 0.610388
f_p1 := 1/(π*dt)*atan(((1/G_s^2 - 1)/(1/G_p^2 - 1))^(-0.5/N)*tan(π*f_s*dt)) = 0.332254
0.5*ln((1/G_s^2 - 1)/(1/G_p^2 - 1))/(ln(tan(π*f_s1*dt)) - ln(tan(π*f_p*dt))) = 8
0.5*ln((1/G_s^2 - 1)/(1/G_p^2 - 1))/(ln(tan(π*f_s*dt)) - ln(tan(π*f_p1*dt))) = 8
