# Рассчёт фильтра Чебышева I-рода
# https://ru.dsplib.org/content/filter_cheby1_ap/filter_cheby1_ap.html
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db(x) := 10^(x/20)
db_P(x) := 10^(x/10)
to_db(x) := 20*log(|x|)
to_dbP(x) := 10*log(|x|)
roundup(x) := Trunc(x, 1) + (Trunc(x, 1) ≠ x)
abs(z) := |z|
samples := 100
n := 0 .. samples - 1
circle_x[n] := cos(2*π/(samples - 1)*n)
circle_y[n] := sin(2*π/(samples - 1)*n)
Ki(k) :=
    k_0 ← k/(1 + sqrt(1 - k*k))
    k_0*k_0
K(k) :=
    ki ← Ki(k)
    (1 + ki)*K(ki) if k - ki > 0
    π/2 otherwise
T(k) := K(sqrt(1 - k*k))
sn(u, k) :=
    ki ← Ki(k)
    sin(u*π/2) if k - ki ≤ 0
    otherwise
        w ← sn(u, ki)
        (1 + ki)/(1/w + ki*w)
cd(u, k) :=
    ki ← Ki(k)
    cos(u*π/2) if k - ki ≤ 0
    otherwise
        w ← cd(u, ki)
        (1 + ki)/(1/w + ki*w)
sn_inv(sn, k) :=
    ki ← Ki(k)
    sn_inv(2*sn/((1 + ki)*(1 + sqrt(1 - k*k*sn*sn))), ki) if k - ki > 0
    2*asin(sn)/π
cd_inv(cn, k) :=
    ki ← Ki(k)
    cd_inv(2*cn/((1 + ki)*(1 + sqrt(1 - k*k*cn*cn))), ki) if k - ki > 0
    2*acos(cn)/π
K(0.66667) = 1.80967
T(0.66667) = 1.90424
K(0.0028615) = 1.5708
T(0.0028615) = 7.24272
Z(p_0, f_d) := (2*f_d + p_0)/(2*f_d - p_0)
z2p(z_0, f_d) := 2*f_d*(1 - z_0^-1)/(1 + z_0^-1)
ln(10) = 2.30259
cd(0.6, 0.93) = 0.761809
sn(0.6, 0.93) = 0.917919
# 0.917918 | 0.761809423
C(N, ω) := cos(N*acos(ω))
sh(x) := sinh(x)
ch(x) := cosh(x)
arsh(x) := asinh(x)
arch(x) := acosh(x)  # disabled
asinh(0.5) = 0.481212
asinh2(x) := ln(x + sqrt(x^2 + 1))
arch(z) := ln(z + sqrt(z^2 - 1))
arsh(0.5) = 0.481212
asinh2(0.5) = 0.481212
acosh(0.5) = 1.0472i
arch(0.5) = 1.0472i
Integral(f, x1, x2, dx) :=
    x ← x1
    y ← f(x)
    while x ≤ x2
        x ← x + dx
        S ← S + y + (y ← f(x))
    S*0.5*dx
f_p := 500
# Гц - частота пропускания
f_d := 5000  # Гц - частота дискретизации
f_s := 1500
# Гц - частота подавления
dt := 1/f_d = 0.0002
tt[n] := n*dt
h(t, H) := 1/f_d*integral(H(f)*e^(1i*2*π*f*t), f = -f_d/2 .. f_d/2)
h2(t, H) := 1/f_d*Integral(y(f) ← H(f)*e^(1i*2*π*f*t), -f_d/2, f_d/2, f_d/2001)
ω_p := 2*π*f_p/f_d = 0.2*π
# Нормированная полоса среза
ω_p = 0.628319
ω_s := 2*π*f_s/f_d = 0.6*π
# Нормированная полоса заграждения
ω_s = 1.88496
R_p := 1
G_p := (-R_p) db = 0.891251  # Неравномерность в полосе пропускания (дБ)
R_s := 30
G_s := (-R_s) db = 0.0316228  # Уровень подавления в полосе заграждения (дБ)
df := f_d/samples = 50
Ω(T_d, ω) := 2/T_d*tan(ω/2)  # Преобразование частот аналогового фильтра в частоты цифрового
f_analog(f_digital., f_d) := f_d/π*tan(π*f_digital./f_d)
f_digit(f_analog, f_d) := f_d/π*atan(π*f_analog/f_d)
F_p := f_analog(f_p, f_d) = 517.126
F_p = 0.103425 f_d
f_digit(F_p, f_d) = 500
F_s := f_analog(f_s, f_d) = 2190.58
F_s = 0.438116 f_d
Ω_p := 2*π*F_p = 3249.2  # Частота среза аналогового фильтра
Ω_s := 2*π*F_s = 13763.8  # Частота заграждения аналогового фильтра
# Порядок фильтра
ε_p := sqrt(10^(R_p/10) - 1) = 0.508847
ε_p2 := sqrt(G_p^-2 - 1) = 0.508847
ε_s := sqrt(10^(R_s/10) - 1) = 31.607
1/ε_s = 0.0316386
G_p := 1/sqrt(1 + ε_p^2) = 0.891251
ε_s2 := sqrt(G_s^-2 - 1) = 31.607
ε_s - ε_s2 = -3.55271e-15
ε_s/ε_p = 62.1148
Ω_s/Ω_p = 4.23607
k_ω := ω_p/ω_s = 0.333333
k_ε := ε_p/ε_s = 0.0160992
log(sqrt((G_s^-2 - 1)/(10^(R_p/10) - 1)) + sqrt((G_s^-2 - 1)/(10^(R_p/10) - 1) - 1))/log(f_s/f_p + sqrt((f_s/f_p)^2 - 1)) = 2.73554
Order_ChebI(f_p, f_s, G_p, G_s) := arch(sqrt((G_s^-2 - 1)/(10^(R_p/10) - 1)))/arch(f_s/f_p)
arcos(z) := ln(z + sqrt(z^2 - 1))
# Порядок фильтра
[G, f] ← [(G_s^-2 - 1)/(G_p^-2 - 1), f_s/f_p]
log(sqrt(G) + sqrt(G - 1))/log(f + sqrt(f^2 - 1))
= 2.73554
arch(ε_s/ε_p) = 4.82207
N_d := arch(ε_s/ε_p)/arch(f_s/f_p) = 2.73554
N := ceil(N_d) = 3
arcos(ε_s/ε_p) = 4.82207
# Число парных полюсов | Наличие/отсутсвтие центрального полюса
L := Trunc(N/2, 1) = 1
r := mod(N, 2) = 1
2*L + r = 3
G_p := 1/sqrt(1 + ε_p^2) = 0.891251
N_d - Order_ChebI(f_p, f_s, G_p, G_s) = 0
β := 1/N*arsh(1/ε_p) = 0.475992
arch(1.1) = 0.443568
θ(n) := (2*n - 1)/(2*N)*π
θ(n) := π/N*(n - 1/2)
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poles(r, L) :=
    i ← 0
    if r ≠ 0
        P[i] ← -sh(β)
        i ← 1
    for n ∈ 1 .. L
        P[i] ← -sh(β)*sin(θ(n)) + 1i*ch(β)*cos(θ(n))
        P[i + 1] ← -sh(β)*sin(θ(n)) - 1i*ch(β)*cos(θ(n))
        i ← i + 2
    P
p0 := poles(r, L)
p0 = [-0.494171; -0.247085 + 0.965999i; -0.247085 - 0.965999i]
G_0 := 1/product(-p0[i], i = 0 .. rows(p0) - 1)
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G_0 = 2.03539
H_0(p) := G_p^(1 - r)/G_0*1/product(p - p0[i], i = 0 .. rows(p0) - 1)
Ω_p/f_d = 0.649839
ω_p = 0.628319
H_0(0) = 1
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Ω_p = 3249.2
# Масштабируем передаточную функцию фильтра на требуемую частоту пропускания
Ω_p := 2*π*F_p
Ω_p = 3249.2
H(p) := H_0(p/Ω_p)
# Делаем преобразование плоскости p в плоскость z путём подстановки p == 2*f_d*(1 - z^-1)/(1 + z^-1)
Polinom(P, p) := product(p - P[i], i = 0 .. rows(P) - 1)
H_z(z) := H(2*f_d*(1 - z^-1)/(1 + z^-1))
Ω_p = 3249.2
# Масштабируем нули и полюса
p_01 := p0*Ω_p
p_01 = [-1605.66; -802.829 + 3138.72i; -802.829 - 3138.72i]
G_01 := 1/product(|p_01[i]|, i = 0 .. rows(p_01) - 1) = 5.93361e-11
H_01(p) := G_p^(1 - r)/1*1/product(p - p_01[i], i = 0 .. rows(p_01) - 1)
H_z1(z) := H_01(2*f_d*(1 - z^-1)/(1 + z^-1))
H_02(p) := G_p^(1 - r)/G_01*1/Polinom(p_01, p)
H_z22(z) := H_02(2*f_d*(1 - z^-1)/(1 + z^-1))
ff := [0; f_p; f_s; f_d/2] = [0; 500; 1500; 2500]
# Преобразуем нули и полюса в плоскость Z(p, f_d) := (2*f_d + p)/(2*f_d - p)
[G_p^(1 - r); G_p; G_s; 0] = [1; 0.891251; 0.0316228; 0]
vectorize(|H_z22(e^(1i*2*π*ff/f_d))|) = [1; 0.891251; 0.00674522; 0]
z_0 := vectorize(Z(p_01, f_d))
G_0 = 2.03539
z_0 = [0.723297; 0.707246 + 0.496034i; 0.707246 - 0.496034i]
G_0z := 2^N*1/product(1 - z_0[n], n = 0 .. rows(z_0) - 1) = 87.1486
1/G_0z = 0.0114747
G_p^(1 - r) = 1
r = 1
G_p^(1 - r)/G_0z = 0.0114747
H_z2(z) := G_p^(1 - r)/G_0z*(1 + z^-1)^N/product(1 - z_0[n]*z^-1, n = 0 .. rows(z_0) - 1)
[G_p^(1 - r); G_p; G_s; 0] = [1; 0.891251; 0.0316228; 0]
vectorize(|H_z2(e^(1i*2*π*ff/f_d))|) = [1; 0.891251; 0.00674522; 0]
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G_p = 0.891251
H1(p) := H_01(p)
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h0 := h2(0, H(f) ← H_z2(e^(1i*2*π*f/f_d))*1/(1 - e^(-1i*2*π*f/f_d))) = -0.488525 - 4.03093e-11i
hh_z2 := vectorize(h(tt, H(f) ← H_z2(e^(1i*2*π*f/f_d))))
hp_z2 := vectorize(h2(tt, H(f) ← H_z2(e^(1i*2*π*f/f_d))*1/(1 - e^(-1i*2*π*f/f_d)))) - h0
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Re(hh_z2) = [
    0.0114747; 0.0589544; 0.140153; 0.212976; 0.239139; 0.210051; 0.140879; 0.0585958; -0.010622; -0.0503432
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]
20*log(|H_z2(e^(1i*2*π*f_p/f_d))|) = -1
20*log(|H_z2(e^(1i*2*π*f_s/f_d))|) = -43.4201
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ff := 0, f_s/100 .. f_s
Φ(f) := integral(d/df1(arg(H_z(e^(1i*2*π*f1/f_d)))/π), f1 = 0 .. f)
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G := (G_s^-2 - 1)/(G_p^-2 - 1) = 3858.25
k_f := f_s/f_p = 3
[G, f] ← [(G_s^-2 - 1)/(G_p^-2 - 1), f_s/f_p]
log(sqrt(G) + sqrt(G - 1))/log(f + sqrt(f^2 - 1))
= 2.73554
Order := N_d
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f_sN(Order) :=
    G ← (G_s^-2 - 1)/(G_p^-2 - 1)
    f_p*cosh(ln(sqrt(G) + sqrt(G - 1))/Order)
f_pN(Order) :=
    G ← (G_s^-2 - 1)/(G_p^-2 - 1)
    f_s/cosh(ln(sqrt(G) + sqrt(G - 1))/Order)
G_sN(Order) :=
    f ← f_s/f_p
    1/sqrt(1/4*((f + sqrt(f^2 - 1))^Order + 1/(f + sqrt(f^2 - 1))^Order)^2*(G_p^-2 - 1) + 1)
G_pN(Order) :=
    f ← f_s/f_p
    1/sqrt((G_s^-2 - 1)/(1/4*((f + sqrt(f^2 - 1))^Order + 1/(f + sqrt(f^2 - 1))^Order)^2) + 1)
