# Рассчёт Эллиптического фильтра
# https://ru.dsplib.org/content/filter_ellip_ap/filter_ellip_ap.html
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f_d := 10  # Гц - частота дискретизации
db(x) := 10^(x/20)
db_P(x) := 10^(x/10)
to_db(x) := 20*log(|x|)
to_dbP(x) := 10*log(|x|)
roundup(x) := Trunc(x, 1) + (Trunc(x, 1) ≠ x)
abs(z) := |z|
samples := 100
n := 0 .. samples - 1
circle_x[n] := cos(2*π/(samples - 1)*n)
circle_y[n] := sin(2*π/(samples - 1)*n)
df := f_d/samples = 0.1
h(t, H) := 1/f_d*integral(H(f)*e^(1i*2*π*f*t), f = -f_d/2 .. f_d/2)
dt := 1/f_d = 0.1
tt[n] := n*dt
Ki(k) :=
    k_0 ← k/(1 + sqrt(1 - k*k))
    k_0*k_0
K(k) :=
    ki ← Ki(k)
    (1 + ki)*K(ki) if k - ki > 0
    π/2 otherwise
T(k) := K(sqrt(1 - k*k))
sn(u, k) :=
    ki ← Ki(k)
    sin(u*π/2) if k - ki ≤ 0
    otherwise
        w ← sn(u, ki)
        (1 + ki)/(1/w + ki*w)
cd(u, k) :=
    ki ← Ki(k)
    cos(u*π/2) if k - ki ≤ 0
    otherwise
        w ← cd(u, ki)
        (1 + ki)/(1/w + ki*w)
sn_inv(sn, k) :=
    ki ← Ki(k)
    sn_inv(2*sn/((1 + ki)*(1 + sqrt(1 - k*k*sn*sn))), ki) if k - ki > 0
    2*asin(sn)/π
cd_inv(cn, k) :=
    ki ← Ki(k)
    cd_inv(2*cn/((1 + ki)*(1 + sqrt(1 - k*k*cn*cn))), ki) if k - ki > 0
    2*acos(cn)/π
K(0.66667) = 1.80967
T(0.66667) = 1.90424
K(0.0028615) = 1.5708
T(0.0028615) = 7.24272
K(0.9999) = 5.64515
K(1) = 19.4081
Z(p_0, f_d) := (2*f_d + p_0)/(2*f_d - p_0)
z2p(z_0, f_d) := 2*f_d*(1 - z_0^-1)/(1 + z_0^-1)
cd(0.6, 0.93) = 0.761809
sn(0.6, 0.93) = 0.917919
PolynomP(p, P) := product(p - P[n], n = 0 .. rows(P) - 1)
PolynomZ(z, Z) := product(1 - Z[n]*z^-1, n = 0 .. rows(Z) - 1)
0.917918
0.761809423
HP(p, P_0, P_p) := PolynomP(p, P_0)/PolynomP(p, P_p)
HZ(z, Z_0, Z_p) := PolynomZ(z, Z_0)/PolynomZ(z, Z_p)
Ω(T_d, ω) := 2/T_d*tan(ω/2)  # Преобразование частот аналогового фильтра в частоты цифрового
f_analog(f_digital., f_d) := f_d/π*tan(π*f_digital./f_d)
f_digit(f_analog, f_d) := f_d/π*atan(π*f_analog/f_d)
kHz := 10^3
conj(z) := Re(z) - 1i*Im(z)
f_pl := 2/(2*π) = 0.31831
f_sl := 4/(2*π) = 0.63662
f_sh := 12/(2*π) = 1.90986
f_ph := 15/(2*π) = 2.38732
ω_pl := 2*π*f_pl = 2
ω_sl := 2*π*f_sl = 4
ω_sh := 2*π*f_sh = 12
ω_ph := 2*π*f_ph = 15
ω_c := ω_sl*ω_sh = 48
Δω := ω_sh - ω_sl = 8
Ω(T_d, ω) := 2/T_d*tan(ω/2)  # Преобразование частот аналогового фильтра в частоты цифрового
F_pl := f_analog(f_pl, f_d) = 0.319375
F_sl := f_analog(f_sl, f_d) = 0.645246
F_sh := f_analog(f_sh, f_d) = 2.17768
F_ph := f_analog(f_ph, f_d) = 2.96536
F_pl/f_pl - 1 = 0.334672 %
F_sl/f_sl - 1 = 1.35502 %
F_sh/f_sh - 1 = 14.0228 %
F_ph/f_ph - 1 = 24.2129 %
Ω_pl := 2*π*F_pl = 2.00669
Ω_sl := 2*π*F_sl = 4.0542
Ω_sh := 2*π*F_sh = 13.6827
Ω_ph := 2*π*F_ph = 18.6319
Ω_c := Ω_sl*Ω_sh = 55.4726
ΔΩ := Ω_sh - Ω_sl = 9.62854
Ω_0 :=
    Ω_p ←
        Ω_ph if Ω_c/Ω_ph > Ω_pl
        Ω_pl otherwise
    |ΔΩ*Ω_p/(Ω_c - Ω_p^2)|
    = 0.615059
ω_0 :=
    ω_p ←
        ω_ph if ω_c/ω_ph > ω_pl
        ω_pl otherwise
    |Δω*ω_p/(ω_c - ω_p^2)|
    = 0.677966
f_0 := ω_0/(2*π) = 0.107902
F_0 := Ω_0/(2*π) = 0.0978897
Ω_1 := 1
ω_1 := 1
F_1 := Ω_1/(2*π) = 0.159155
f_1 := ω_1/(2*π) = 0.159155
R_p := 1  # Неравномерность в полосе пропускания (дБ)
G_p := (-R_p) db = 0.891251
R_s := 40  # Уровень подавления в полосе заграждения (дБ)
G_s := (-R_s) db = 0.01
# Порядок фильтра
G_p := 1/sqrt(1 + ε_p^2)  # disabled
ε_p := sqrt(10^(R_p/10) - 1) = 0.508847
1/sqrt(1 + ε_p^2) = 0.891251
G_p = 0.891251
ε_s := sqrt(10^(R_s/10) - 1) = 99.995
1/ε_s = 0.0100005
k_ω := Ω_0/Ω_1 = 0.615059
ε_s/ε_p = 196.513
Ω_0/Ω_1 = 0.615059
k_ε := ε_p/ε_s = 0.00508873
T(k_ε)*K(k_ω)/(K(k_ε)*T(k_ω)) = 3.79068
N := ceil(T(k_ε)*K(k_ω)/(K(k_ε)*T(k_ω))) = 4
L := Trunc(N/2, 1) = 2
r := mod(N, 2) = 0
u(n) := (2*n - 1)/N
un := matrix(L, 1, f(n, m) ← u(n + 1))
m := sqrt(1 - k_ε^2) = 0.999987
un = [0.25; 0.75]
k_p := m^N*product(sn(u(n), m)^4, n = 1 .. L) = 0.751393
k_ω := sqrt(1 - k_p^2) = 0.659855
# Нули
# http://www.dsplib.ru/content/filters/ch8/ch8.html
zeros := 1i*Ω_0/(k_ω*cd(un, k_ω)) = [0.989969i; 2.16826i]
υ_0 := -1i/N*sn_inv(1i/ε_p, k_ε) = 0.227269
p_0 := stack(zeros, conj(zeros))
# Полюса
p_p :=
    pp[0] ← 1i*sn(1i*υ_0, k_ω) if r > 0
    for n ∈ 0 .. L - 1
        pp[2*n + r] ← 1i*cd(un[n] - 1i*υ_0, k_ω)
        pp[2*n + 1 + r] ← conj(pp[2*n + r])
    pp*Ω_0
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G_0 := PolynomP(0, p_0)/PolynomP(0, p_p)
H_0(p) := G_p^(1 - r)/G_0*PolynomP(p, p_0)/PolynomP(p, p_p)
Ω_0 = 0.615059
p_0 = [0.989969i; 2.16826i; -0.989969i; -2.16826i]
p_p = [-0.0647554 + 0.611192i; -0.0647554 - 0.611192i; -0.224065 + 0.29437i; -0.224065 - 0.29437i]
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# Подставнока
p == Δω*p/(p^2 + ω_c^2)
pzf_w(P_p, P_0, ω_c, Δω) :=
    count_p ← rows(P_p)
    count_0 ← rows(P_0)
    for i ∈ 0 .. count_p - 1
        pdw ← 0.5*Δω/P_p[i]
        [p1[i*2]; p1[i*2 + 1]] ← [pdw + sqrt(pdw^2 - ω_c); pdw - sqrt(pdw^2 - ω_c)]
    for i ∈ 0 .. count_0 - 1
        pdw ← 0.5*Δω/P_0[i]
        [p01[i*2]; p01[i*2 + 1]] ← [pdw + sqrt(pdw^2 - ω_c); pdw - sqrt(pdw^2 - ω_c)]
    if count_p ≠ count_0
        for i ∈ 0 .. (count_p - count_0) - 1
            [p02[i*2]; p02[i*2 + 1]] ← [1i*sqrt(ω_c); -1i*sqrt(ω_c)]
        p01 ← stack(p01, p02)
    [p1; p01]
pzf(P_p, P_0, f_min, f_max) :=
    count_p ← rows(P_p)
    count_0 ← rows(P_0)
    ω_min ← 2*π*f_min
    ω_max ← 2*π*f_max
    Δω ← ω_max - ω_min
    ω_c ← ω_min*ω_max
    pzf_w(P_p, P_0, ω_c, Δω)
H0(p) := G_p^(1 - r)/G_0*product(p - p_0[n], n = 0 .. rows(p_0) - 1)/product(p - p_p[n], n = 0 .. rows(p_p) - 1)
[p_p1; p_01] := pzf_w(p_p, p_0, Ω_c, ΔΩ)
G_02 := HP(1i*2*π*sqrt(F_sl*F_sh), p_01, p_p1) = 0.0112205
F_sl/f_sl = 1.01355
F_sh/f_sh = 1.14023
G_02 := HP(1i*2*π*sqrt(F_sl*F_sh), p_01, p_p1) = 0.0112205
Δω/(2*p_0) + sqrt((Δω/(2*p_0))^2 - ω_c) = [3.97981i; 5.32481i; 12.0609i; 9.0144i]
Δω/(2*p_p) + sqrt((Δω/(2*p_p))^2 - ω_c) = [-0.216963 + 2.99567i; -0.216963 - 2.99567i; -1.13759 + 1.80872i; -1.13759 - 1.80872i]
[p_p1; p_01] := pzf(p_p, p_0, F_sl, F_sh)
F_pl/f_pl = 1.00335
F_ph/f_ph = 1.24213
rows(p_p1) = 8
rows(p_01) = 8
p_01 = [4.03199i; -13.7581i; 5.55157i; -9.99224i; 13.7581i; -4.03199i; 9.99224i; -5.55157i]
p_p1 = [-0.227959 + 2.97271i; -1.42261 - 18.5515i; -0.227959 - 2.97271i; -1.42261 + 18.5515i; -1.13074 + 1.73435i; -14.6331 - 22.4444i; -1.13074 - 1.73435i; -14.6331 + 22.4444i]
H_2(p) := G_p^(1 - r)*product(p - p_01[n], n = 0 .. rows(p_01) - 1)/product(p - p_p1[n], n = 0 .. rows(p_p1) - 1)
H_23(p) := H_0(ΔΩ*p/(p^2 + Ω_c))
Δω/(2*p_0) - sqrt((Δω/(2*p_0))^2 - ω_c) = [-12.0609i; -9.0144i; -3.97981i; -5.32481i]
Δω/(2*p_p) - sqrt((Δω/(2*p_p))^2 - ω_c) = [-1.15443 - 15.9395i; -1.15443 + 15.9395i; -11.96 - 19.0159i; -11.96 + 19.0159i]
rows(p_01) = 8
rows(p_p1) = 8
exp(sum(ln(-p_0)) - sum(ln(-p_p))) = 89.1229
H_3(p) := G_p^(1 - r)/G_0*product(-p_0[n], n = 0 .. rows(p_0) - 1)/product(-p_p[n], n = 0 .. rows(p_p) - 1)*product((p - (Δω/(2*p_0[n]) + sqrt((Δω/(2*p_0[n]))^2 - ω_c)))*(p - (Δω/(2*p_0[n]) - sqrt((Δω/(2*p_0[n]))^2 - ω_c))), n = 0 .. rows(p_0) - 1)/product((p - (Δω/(2*p_p[n]) + sqrt((Δω/(2*p_p[n]))^2 - ω_c)))*(p - (Δω/(2*p_p[n]) - sqrt((Δω/(2*p_p[n]))^2 - ω_c))), n = 0 .. rows(p_p) - 1)*product((p - 1i*sqrt(ω_c))*(p + 1i*sqrt(ω_c)), n = 0 .. rows(p_p) - rows(p_0) - 1)
product(-p_0[n], n = 0 .. rows(p_0) - 1)/product(-p_p[n], n = 0 .. rows(p_p) - 1) = 89.1229
H_3(p) := G_p^(1 - r)/G_0*product(-p_0[n], n = 0 .. rows(p_0) - 1)/product(-p_p[n], n = 0 .. rows(p_p) - 1)*product({
    pdw ← 0.5*Δω/p_0[n]
    ((p - (pdw + sqrt(pdw^2 - ω_c)))*(p - (pdw - sqrt(pdw^2 - ω_c))))
}, n = 0 .. rows(p_0) - 1)/product({
    pdw ← 0.5*Δω/p_p[n]
    ((p - (pdw + sqrt(pdw^2 - ω_c)))*(p - (pdw - sqrt(pdw^2 - ω_c))))
}, n = 0 .. rows(p_p) - 1)*((p - 1i*sqrt(ω_c))*(p + 1i*sqrt(ω_c)))^(rows(p_p) - rows(p_0))
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# Делаем преобразование плоскости p в плоскость z путём подстановки p == 2*f_d*(1 - z^-1)/(1 + z^-1)
Z(p, f_d) := (2*f_d + p)/(2*f_d - p)
H_z(z) := H_2(2*f_d*(1 - z^-1)/(1 + z^-1))
z_0 := vectorize(Z(p_01, f_d))
z_p := vectorize(Z(p_p1, f_d))
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rows(z_0) = 8
z_0 = [0.92189 + 0.387452i; 0.357577 - 0.933884i; 0.856925 + 0.515442i; 0.600497 - 0.799627i; 0.357577 + 0.933884i; 0.92189 - 0.387452i; 0.600497 + 0.799627i; 0.856925 - 0.515442i]
z_p = [0.935656 + 0.284465i; 0.0670129 - 0.924011i; 0.935656 - 0.284465i; 0.0670129 + 0.924011i; 0.88031 + 0.15433i; -0.186635 - 0.527111i; 0.88031 - 0.15433i; -0.186635 + 0.527111i]
rows(z_p) = 8
G_0z := product(1 - z_0[n], n = 0 .. rows(z_0) - 1)/product(1 - z_p[n], n = 0 .. rows(z_p) - 1) = 4.86563
M_p := [f_pl, 1; f_sl, 1; f_sl, G_s; f_sh, G_s; f_sh, 1; f_ph, 1]
H_z2(z) := G_p^(1 - r)/G_0z*product(1 - z_0[n]*z^-1, n = 0 .. rows(z_0) - 1)/product(1 - z_p[n]*z^-1, n = 0 .. rows(z_p) - 1)
N = 4
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hh_z2 := vectorize(h(tt, H(f) ← H_z2(e^(1i*2*π*f/f_d))))
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ff := 0, 2*f_d/100 .. f_d
Φ(f) := integral(-|d/df1(arg(H_z(e^(1i*2*π*f1/f_d)))/π)|, f1 = 0 .. f)
rows(hh_z2) = 100
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hh_z2 = [
    0.183173; -0.381199 - 3.39965e-11i; 0.453076 + 3.50215e-10i; -0.0629121 - 3.15902e-10i; -0.148023; 0.181721; 0.159684; -0.00893921; 0.013824; 0.135554
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]
